<?xml version="1.0"?>
<?xml-stylesheet type="text/xsl" href="/JSBSim.xsl"?>
<fdm_config name="SEPECAT-Jaguar" version="2.0" release="BETA"
   xmlns:xsi="http://www.w3.org/2001/XMLSchema-instance"
   xsi:noNamespaceSchemaLocation="JSBSim.xsd">

    <fileheader>
        <author>Richard Harrison</author>
        <filecreationdate>2020-02-21</filecreationdate>
        <version>1.0</version>
        <copyright>Copyright (C) 2020 Richard Harrison, All rights reserved</copyright>
        <description></description>
        <note>Built using VSPAERO.Aircraft origin for measurements is the nose
ref: Data from Jane's All The World's Aircraft 1980–81,[28]
General characteristics
Crew: 1 (A and S) ; 2 (B and E)
Length: 16.83 m (55 ft 3 in) (A and S) with minor variations dependent on nose configuration ;
17.53 m (57.5 ft) (B and E) with minor variations dependent on nose probe type (AAR or pitot)
Wingspan: 8.69 m (28 ft 6 in)
Height: 4.89 m (16 ft 1 in)
Wing area: 24.18 m2 (260.3 sq ft)
Aspect ratio: 3.12
Empty weight: 7,000 kg (15,432 lb)
Gross weight: 10,954 kg (24,149 lb) full internal fuel and 120 rpg
Max takeoff weight: 15,700 kg (34,613 lb) with external stores
Fuel capacity: 4,200 l (1,100 US gal; 920 imp gal) internal, with provision for three 1,200 l (320 US gal; 260 imp gal) drop tanks on inboard and centreline pylons
Powerplant: 2 × Rolls-Royce Turbomeca Adour Mk.102 afterburning turbofan engines, 22.75 kN (5,110 lbf) thrust each dry, 32.5 kN (7,300 lbf) with afterburner
Performance
Maximum speed: 1,350 km/h (840 mph, 730 kn) Mach 1.1 at sea level
1,699 km/h (1,056 mph; 917 kn) Mach 1.6 at 11,000 m (36,000 ft)
Landing speed: 213 km/h (132 mph; 115 kn)
Combat range: 815 km (506 mi, 440 nmi) hi-lo-hi (internal fuel)
575 km (357 mi; 310 nmi) lo-lo-lo (internal fuel)
1,408 km (875 mi; 760 nmi) hi-lo-hi (with external fuel)
908 km (564 mi; 490 nmi) lo-lo-lo (with external fuel)
Ferry range: 1,902 km (1,182 mi, 1,027 nmi) with full internal and external tanks
Service ceiling: 14,000 m (46,000 ft) [141]
g limits: +8.6 (ultimate load +12)
Time to altitude: 9,145 m (30,003 ft) in 1 minute 30 seconds[141]
Wing loading: 649.3 kg/m2 (133.0 lb/sq ft) maximum

Thrust/weight: Adour Mk.102: 0.422
Adour Mk.104: 0.464
Adour Mk.811: 0.486

Take-off run: 580 m (1,900 ft) with typical tactical load
Take-off run to 15 m (49 ft): 940 m (3,080 ft) with typical tactical load
Landing run from 15 m (49 ft): 785 m (2,575 ft) with typical tactical load
Landing run: 470 m (1,540 ft) with typical tactical load

Armament
Guns: 2× 30 mm (1.181 in) calibre DEFA cannon with up to 150 rounds/gun
Hardpoints: 5 (4× under-wing and 1× center-line) with a capacity of 10,000 lb (4,500 kg),with provisions to carry combinations of:
Rockets: 8× Matra rocket pods with 18× SNEB 68 mm rockets each
Missiles:
AS.37 Martel anti-radar missiles or
AS-30L laser guided air-to-ground missiles.
2× R550 Magic air-to-air missiles on overwing pylons
2× AIM-9 Sidewinder air-to-air missiles on overwing pylons
2× AIM-9 Sidewinder air-to-air missiles on outboard pylons
Bombs:
various unguided or laser-guided bombs or
2× WE177A nuclear bombs
1× AN-52 nuclear bomb
Other: ECM protection pods, Reconnaissance Pod, ATLIS laser/electro-optical targeting pod, external drop tanks for extended range/loitering time
        </note>
        <note>Built with AeroTool 1.0.0.0: Options: AeroDetail=Full, Flaps, Gear, GroundEffect, Mach, Speedbrake, WakeIterations=3</note>
        <limitation></limitation>
        <reference
            refID="ZDAT/AED/2019/11-01"
            author="Richard Harrison, rjh@zaretto.com"
            title="SEPECAT Jaguar Aerodynamic data built from vspaero; CG (8.4247, 0, -0.005)M"
            date="November, 2019"
            URL="http://www.zaretto.com/sites/zaretto.com/files/SEPECAT-Jaguar-data/rjh-zaretto-SEPECAT-Jaguar-aerodynamic-data-vspaero.pdf"
        />
        <reference
            refID="ZDAT/AED/2019/11-1"
            author="Richard Harrison, rjh@zaretto.com"
            title="SEPECAT-Jaguar Aerodynamic"
            date="November 2019"
            URL="http://www.zaretto.com/sites/zaretto.com/files/SEPECAT-Jaguar-data/rjh-zaretto-SEPECAT-Jaguar-aerodynamic-data.pdf"
        />
    </fileheader>
<metrics>
  <wingarea unit="M2">18.338</wingarea>
  <wingspan unit="M">16.94</wingspan>
  <wing_incidence>1.52</wing_incidence>
  <chord unit="M">6.94</chord>
  <htailarm>0</htailarm>
  <location unit="M" name="EYEPOINT">
    <x>3.371</x>
    <y>0</y>
    <z>0.965</z>
  </location>
  <location unit="M" name="VRP">
    <x>-4.2917</x>
    <y>0</y>
    <z>0.6</z>
  </location>
  <location unit="M" name="AERORP">
    <x>8.6247</x>
    <y>0</y>
    <z>-0.005</z>
  </location>
</metrics>

<mass_balance>
  <ixx>3418</ixx>
  <iyy>82395</iyy>
  <izz>61297</izz>
  <ixz>-804</ixz>
  <emptywt unit="KG">7000</emptywt>
  <location unit="M" name="CG">
    <x>8.4247</x>
    <y>0</y>
    <z>-0.005</z>
  </location>
</mass_balance>

<ground_reactions>
  <contact type="BOGEY" name="NOSE_LG">
    <!--0: NOSE_LG-->
    <location unit="M">
      <x>3.5339</x>
      <y>0</y>
      <z>-1.5867</z>
    </location>
    <static_friction>1.0</static_friction>
    <dynamic_friction>0.5</dynamic_friction>
    <rolling_friction>0.02</rolling_friction>
    <spring_coeff unit="LBS/FT">24251</spring_coeff>
    <damping_coeff unit="LBS/FT/SEC">5432.224</damping_coeff>
    <max_steer unit="DEG">35</max_steer>
    <brake_group>NOSE</brake_group>
    <retractable>1</retractable>
  </contact>
  <contact type="BOGEY" name="LEFT_MLG">
    <!--1: LEFT_MLG-->
    <location unit="M">
      <x>8.8247</x>
      <y>-1.435</y>
      <z>-1.6623</z>
    </location>
    <static_friction>1.0</static_friction>
    <dynamic_friction>0.5</dynamic_friction>
    <rolling_friction>0.02</rolling_friction>
    <spring_coeff unit="LBS/FT">24251</spring_coeff>
    <damping_coeff unit="LBS/FT/SEC">5432.224</damping_coeff>
    <brake_group>LEFT</brake_group>
    <retractable>1</retractable>
  </contact>
  <contact type="BOGEY" name="RIGHT_MLG">
    <!--2: RIGHT_MLG-->
    <location unit="M">
      <x>8.8247</x>
      <y>1.435</y>
      <z>-1.6623</z>
    </location>
    <static_friction>1.0</static_friction>
    <dynamic_friction>0.5</dynamic_friction>
    <rolling_friction>0.02</rolling_friction>
    <spring_coeff unit="LBS/FT">24251</spring_coeff>
    <damping_coeff unit="LBS/FT/SEC">5432.224</damping_coeff>
    <brake_group>RIGHT</brake_group>
    <retractable>1</retractable>
  </contact>
  <contact type="STRUCTURE" name="NOSE">
    <!--3: NOSE-->
    <location unit="M">
      <x>0</x>
      <y>0</y>
      <z>0</z>
    </location>
    <static_friction>1.2</static_friction>
    <dynamic_friction>1.212</dynamic_friction>
    <rolling_friction>1.413</rolling_friction>
    <spring_coeff unit="LBS/FT">6300</spring_coeff>
    <damping_coeff unit="LBS/FT/SEC">1400</damping_coeff>
  </contact>
  <contact type="STRUCTURE" name="FRONT_LOWER_FUSELAGE">
    <!--4: FRONT_LOWER_FUSELAGE-->
    <location unit="M">
      <x>1.65</x>
      <y>0</y>
      <z>-0.164</z>
    </location>
    <static_friction>1.2</static_friction>
    <dynamic_friction>1.212</dynamic_friction>
    <rolling_friction>1.413</rolling_friction>
    <spring_coeff unit="LBS/FT">6300</spring_coeff>
    <damping_coeff unit="LBS/FT/SEC">1400</damping_coeff>
  </contact>
  <contact type="STRUCTURE" name="CANOPY">
    <!--5: CANOPY-->
    <location unit="M">
      <x>4.24</x>
      <y>0</y>
      <z>1.3078</z>
    </location>
    <static_friction>1.2</static_friction>
    <dynamic_friction>1.212</dynamic_friction>
    <rolling_friction>1.413</rolling_friction>
    <spring_coeff unit="LBS/FT">6300</spring_coeff>
    <damping_coeff unit="LBS/FT/SEC">1400</damping_coeff>
  </contact>
  <contact type="STRUCTURE" name="REAR_UPPER_FUSELAGE">
    <!--6: REAR_UPPER_FUSELAGE-->
    <location unit="M">
      <x>10.1598</x>
      <y>0</y>
      <z>1.0113</z>
    </location>
    <static_friction>1.2</static_friction>
    <dynamic_friction>1.212</dynamic_friction>
    <rolling_friction>1.413</rolling_friction>
    <spring_coeff unit="LBS/FT">6300</spring_coeff>
    <damping_coeff unit="LBS/FT/SEC">1400</damping_coeff>
  </contact>
  <contact type="STRUCTURE" name="LEFT_WING">
    <!--7: LEFT_WING-->
    <location unit="M">
      <x>10.6</x>
      <y>-4.179</y>
      <z>0.3545</z>
    </location>
    <static_friction>1.2</static_friction>
    <dynamic_friction>1.212</dynamic_friction>
    <rolling_friction>1.413</rolling_friction>
    <spring_coeff unit="LBS/FT">6300</spring_coeff>
    <damping_coeff unit="LBS/FT/SEC">1400</damping_coeff>
  </contact>
  <contact type="STRUCTURE" name="RIGHT_WING">
    <!--8: RIGHT_WING-->
    <location unit="M">
      <x>10.6</x>
      <y>4.179</y>
      <z>0.3545</z>
    </location>
    <static_friction>1.2</static_friction>
    <dynamic_friction>1.212</dynamic_friction>
    <rolling_friction>1.413</rolling_friction>
    <spring_coeff unit="LBS/FT">6300</spring_coeff>
    <damping_coeff unit="LBS/FT/SEC">1400</damping_coeff>
  </contact>
  <contact type="STRUCTURE" name="LEFT_HTAIL">
    <!--9: LEFT_HTAIL-->
    <location unit="M">
      <x>14.025</x>
      <y>-2.1215</y>
      <z>0.7267</z>
    </location>
    <static_friction>1.2</static_friction>
    <dynamic_friction>1.212</dynamic_friction>
    <rolling_friction>1.413</rolling_friction>
    <spring_coeff unit="LBS/FT">6300</spring_coeff>
    <damping_coeff unit="LBS/FT/SEC">1400</damping_coeff>
  </contact>
  <contact type="STRUCTURE" name="RIGHT_HTAIL">
    <!--10: RIGHT_HTAIL-->
    <location unit="M">
      <x>14.025</x>
      <y>2.1215</y>
      <z>0.7267</z>
    </location>
    <static_friction>1.2</static_friction>
    <dynamic_friction>1.212</dynamic_friction>
    <rolling_friction>1.413</rolling_friction>
    <spring_coeff unit="LBS/FT">6300</spring_coeff>
    <damping_coeff unit="LBS/FT/SEC">1400</damping_coeff>
  </contact>
  <contact type="STRUCTURE" name="VTAIL">
    <!--11: VTAIL-->
    <location unit="M">
      <x>14.2226</x>
      <y>0</y>
      <z>2.726</z>
    </location>
    <static_friction>1.2</static_friction>
    <dynamic_friction>1.212</dynamic_friction>
    <rolling_friction>1.413</rolling_friction>
    <spring_coeff unit="LBS/FT">6300</spring_coeff>
    <damping_coeff unit="LBS/FT/SEC">1400</damping_coeff>
  </contact>
</ground_reactions>

<propulsion>
  <engine file="Adour804">
    <location unit="M">
      <x>12.916</x>
      <y>-0.4127</y>
      <z>0.2</z>
    </location>
    <orient unit="DEG">
      <roll>0</roll>
      <pitch>6</pitch>
      <yaw>0</yaw>
    </orient>
    <feed>1</feed>
    <feed>0</feed>
    <thruster file="direct">
      <location unit="M">
        <x>12.916</x>
        <y>-0.4127</y>
        <z>0.2</z>
      </location>
      <orient unit="DEG">
        <roll>0</roll>
        <pitch>6</pitch>
        <yaw>0</yaw>
      </orient>
    </thruster>
  </engine>
  <engine file="Adour804">
    <location unit="M">
      <x>12.916</x>
      <y>0.4127</y>
      <z>0.2</z>
    </location>
    <orient unit="DEG">
      <roll>0</roll>
      <pitch>6</pitch>
      <yaw>0</yaw>
    </orient>
    <feed>2</feed>
    <feed>0</feed>
    <thruster file="direct">
      <location unit="M">
        <x>12.916</x>
        <y>0.4127</y>
        <z>0.2</z>
      </location>
      <orient unit="DEG">
        <roll>0</roll>
        <pitch>6</pitch>
        <yaw>0</yaw>
      </orient>
    </thruster>
  </engine>
  <tank number="0" type="FUEL">
    <!--0: CentreTank-->
    <location unit="M">
      <x>8.1247</x>
      <y>0</y>
      <z>-0.305</z>
    </location>
    <capacity unit="LBS">4420</capacity>
    <standpipe unit="LBS">100</standpipe>
    <contents unit="LBS">4420</contents>
    <priority>1</priority>
  </tank>
  <tank number="1" type="FUEL">
    <!--1: LeftWingTank-->
    <location unit="M">
      <x>9.2247</x>
      <y>-2.09</y>
      <z>0.395</z>
    </location>
    <capacity unit="LBS">3470</capacity>
    <standpipe unit="LBS">100</standpipe>
    <contents unit="LBS">3470</contents>
    <priority>2</priority>
  </tank>
  <tank number="2" type="FUEL">
    <!--2: RightWingTank-->
    <location unit="M">
      <x>9.2247</x>
      <y>2.09</y>
      <z>0.395</z>
    </location>
    <capacity unit="LBS">3470</capacity>
    <standpipe unit="LBS">100</standpipe>
    <contents unit="LBS">3470</contents>
    <priority>2</priority>
  </tank>
</propulsion>

<system file="Propulsion"/>
<system file="autoflight"/>
<system file="jaguar-sas"/>
<system file="Aircraftcontrol"/>
<system file="jaguar-controls"/>
<system file="electrical"/>
<system file="hydraulics"/>


<flight_control name="SEPECAT-Jaguar-FCS">
  <channel name="extra-aero">
        <!-- need %Cg in chord for moments [Xcg - Xref)/100] -->
        <summer name="cg-x-offset-chord-in">
            <input> inertia/cg-x-in</input>
            <input> -metrics/aero-rp-x-in</input>
            <output>inertia/cg-x-offset-chord-in</output>
        </summer>

        <!-- figure out the factor for the fuel tank aero -->
        <pure_gain name="cg-x-chord-percent">
            <description>Percent offset of the CoP from the CG</description>
            <input>inertia/cg-x-offset-chord-in</input>
            <gain> -0.01</gain>
            <clipto>
                <min> -1 </min>
                <max> 1 </max>
            </clipto>
            <output> inertia/cg-x-mac-percent </output>
        </pure_gain>

        <fcs_function name="pb">
            <description>PB Denormalization</description>
            <function>
                    <product>
                        <property>aero/bi2vel</property>
                        <property>velocities/p-aero-rad_sec</property>
                    </product>
            </function>
            <output>aero/pb</output>
        </fcs_function>

        <fcs_function name="cbarq-2vo">
            <description>For denormalization</description>
            <function>
                    <product>
                        <property>aero/ci2vel</property>
                        <property>velocities/q-aero-rad_sec</property>
                    </product>
            </function>
            <output>aero/qb</output>
        </fcs_function>

        <fcs_function name="rb-2vo">
            <description>For denormalization</description>
            <function>
                <product>
                        <property>aero/bi2vel</property>
                        <property>velocities/r-aero-rad_sec</property>
                    </product>
            </function>
            <output>aero/rb</output>
        </fcs_function>


        <fcs_function name="aero-cos-alpha">
            <function>
                <cos>
                    <property>aero/alpha-rad</property>
                </cos>
            </function>
            <output>aero/cos-alpha</output>
        </fcs_function>

        <fcs_function name="aero-sin-alpha">
            <function>
                <sin>
                    <property>aero/alpha-rad</property>
                </sin>
            </function>
            <output>aero/sin-alpha</output>
        </fcs_function>
        <fcs_function name="position/h-agl-m">
            <description>Height above ground (meters)</description>
            <function>
                    <product>
                        <property>position/h-agl-ft</property>
                        <value>0.3048</value>
                    </product>
            </function>
            <output>position/h-agl-m</output>
        </fcs_function>

       </channel>
</flight_control>
<aerodynamics>
    <function name="aero/c/CFXB">
    <description>BASE DRAG</description>
          <table>
            <independentVar lookup="row">aero/alpha-deg</independentVar>
            <independentVar lookup="column">aero/beta-deg</independentVar>
            <tableData>
                                -20	        -10	         -5	          0	          5	         10	         20
                    -20	   0.25651	   0.25605	   0.25894	   0.25896	   0.25891	   0.25602	   0.25646
                    -10	   0.11444	   0.09665	   0.09259	   0.09114	   0.09259	   0.09665	   0.11444
                     -8	   0.09876	   0.07829	   0.07353	   0.07197	   0.07353	   0.07828	   0.09876
                     -4	   0.07987	   0.05529	   0.05136	   0.04766	   0.05136	   0.05529	   0.07987
                      0	   0.07586	   0.05053	   0.04434	   0.04225	   0.04434	   0.05053	   0.07586
                      4	   0.08711	   0.06435	   0.05664	   0.05405	   0.05664	   0.06434	   0.08711
                      8	   0.11701	   0.09465	   0.08673	   0.08450	   0.08673	   0.09465	   0.11702
                     12	   0.16182	   0.13943	   0.13425	   0.13284	   0.13424	   0.13942	   0.16181
                     14	   0.18841	   0.16841	   0.16464	   0.16244	   0.16464	   0.16841	   0.18840
                     16	   0.21961	   0.20165	   0.19778	   0.19606	   0.19777	   0.20167	   0.21962
                     20	   0.29283	   0.27469	   0.27569	   0.27652	   0.27570	   0.27474	   0.29280
                     24	   0.37611	   0.36032	   0.36885	   0.37217	   0.36889	   0.36030	   0.37609
                     28	   0.45058	   0.45191	   0.47572	   0.48412	   0.47572	   0.45183	   0.45058
                     30	   0.52486	   0.52134	   0.53554	   0.54565	   0.53556	   0.52157	   0.52517
                     35	   0.68181	   0.69159	   0.69986	   0.70507	   0.69989	   0.69156	   0.68185
                     45	   1.00825	   1.04529	   1.06163	   1.06568	   1.06185	   1.04509	   1.00847
                     50	   1.24322	   1.30885	   1.33113	   1.34534	   1.33143	   1.30833	   1.24280
                     55	   1.45837	   1.55142	   1.58867	   1.62692	   1.59159	   1.55197	   1.45885
                     60	   1.68529	   1.78609	   1.77979	   1.88127	   1.78904	   1.78586	   1.68729
            </tableData>
          </table>
    </function>
    <function name="aero/c/CFXBRK">
    <description>DRAG DUE TO SPEEDBRAKE</description>
    <product>
          <property>fcs/speedbrake-pos-deg</property>
          <table>
            <independentVar lookup="row">aero/alpha-deg</independentVar>
            <independentVar lookup="column">aero/beta-deg</independentVar>
            <tableData>
                                -20	        -10	         -5	          0	          5	         10	         20
                    -20	   0.01257	   0.01354	   0.01347	   0.01320	   0.01349	   0.01357	   0.01260
                    -10	   0.01597	   0.01738	   0.01736	   0.01722	   0.01737	   0.01738	   0.01597
                     -8	   0.01645	   0.01782	   0.01777	   0.01778	   0.01777	   0.01783	   0.01644
                     -4	   0.01718	   0.01909	   0.01945	   0.01956	   0.01945	   0.01910	   0.01718
                      0	   0.01834	   0.02040	   0.02110	   0.02138	   0.02110	   0.02040	   0.01834
                      4	   0.01929	   0.02193	   0.02208	   0.02214	   0.02207	   0.02193	   0.01929
                      8	   0.02048	   0.02118	   0.02397	   0.02366	   0.02396	   0.02118	   0.02044
                     12	   0.02025	   0.01912	   0.02086	   0.02092	   0.02085	   0.01912	   0.02024
                     14	   0.01976	   0.02156	   0.01961	   0.02043	   0.01962	   0.02160	   0.01981
                     16	   0.02054	   0.02479	   0.02212	   0.02285	   0.02222	   0.02477	   0.02056
                     20	   0.01963	   0.02481	   0.02407	   0.02510	   0.02396	   0.02477	   0.01963
                     24	   0.01604	   0.02355	   0.02143	   0.02076	   0.02137	   0.02352	   0.01602
                     28	   0.01626	   0.02506	   0.01802	   0.01797	   0.01802	   0.02493	   0.01642
                     30	   0.01562	   0.01475	   0.01780	   0.01284	   0.01800	   0.01454	   0.01504
                     35	   0.00569	   0.03931	  -0.01693	   0.00004	  -0.01678	   0.03929	   0.00563
                     45	   0.03069	   0.04221	   0.04434	   0.10111	   0.04421	   0.04239	   0.03036
                     50	   0.02607	   0.05820	   0.05235	   0.06045	   0.05174	   0.06237	   0.02616
                     55	   0.04292	   0.05017	   0.03042	   0.04401	   0.02992	   0.04952	   0.04279
                     60	   0.02970	   0.02176	   0.04930	   0.04036	   0.04061	   0.02196	   0.02884
            </tableData>
          </table>
       </product>
    </function>
    <function name="aero/c/CFXDGE">
    <description>DRAG DUE TO GROUND EFFECT</description>
          <table>
            <independentVar lookup="row">position/h-agl-m</independentVar>
            <independentVar lookup="column">aero/alpha-deg</independentVar>
            <tableData>
                                  0	          2	          4	          6	          8	         10	         12	         14	         16	         20
                      1	   0.00002	   0.00011	   0.00048	   0.00111	   0.00204	   0.00120	  -0.00311	  -0.00606	  -0.01837	   0.06477
                      2	   0.00000	   0.00004	   0.00016	   0.00035	   0.00037	   0.00046	   0.00032	   0.00010	  -0.00344	  -0.01648
                      3	   0.00000	   0.00002	   0.00008	   0.00016	   0.00008	   0.00008	  -0.00030	  -0.00067	  -0.00186	  -0.00619
                      8	   0.00000	   0.00000	  -0.00001	  -0.00004	  -0.00018	  -0.00028	  -0.00048	  -0.00088	  -0.00153	  -0.00351
                     10	   0.00000	  -0.00001	  -0.00002	  -0.00005	  -0.00022	  -0.00032	  -0.00052	  -0.00091	  -0.00144	  -0.00350
                     30	   0.00000	   0.00000	   0.00000	   0.00000	   0.00000	   0.00000	   0.00000	   0.00000	   0.00000	   0.00000
            </tableData>
          </table>
    </function>
    <function name="aero/c/CFXDRD">
    <description>DRAG DUE TO RUDDER DEFLECTION</description>
    <product>
          <property>fcs/rudder-deg</property>
          <table>
            <independentVar lookup="row">aero/alpha-deg</independentVar>
            <independentVar lookup="column">aero/beta-deg</independentVar>
            <tableData>
                                -20	        -10	         -5	          0	          5	         10	         20
                    -20	  -0.00184	  -0.00124	  -0.00089	  -0.00052	  -0.00014	   0.00025	   0.00103
                    -10	  -0.00185	  -0.00122	  -0.00087	  -0.00050	  -0.00012	   0.00025	   0.00104
                     -8	  -0.00182	  -0.00121	  -0.00085	  -0.00050	  -0.00014	   0.00024	   0.00104
                     -4	  -0.00181	  -0.00119	  -0.00086	  -0.00049	  -0.00011	   0.00025	   0.00105
                      0	  -0.00181	  -0.00121	  -0.00086	  -0.00048	  -0.00010	   0.00029	   0.00109
                      4	  -0.00183	  -0.00135	  -0.00092	  -0.00048	  -0.00004	   0.00046	   0.00112
                      8	  -0.00179	  -0.00139	  -0.00092	  -0.00046	  -0.00001	   0.00052	   0.00119
                     12	  -0.00179	  -0.00121	  -0.00079	  -0.00044	  -0.00003	   0.00041	   0.00120
                     14	  -0.00168	  -0.00107	  -0.00071	  -0.00044	  -0.00006	   0.00037	   0.00115
                     16	  -0.00157	  -0.00095	  -0.00060	  -0.00044	  -0.00012	   0.00031	   0.00108
                     20	  -0.00158	  -0.00058	  -0.00032	  -0.00037	  -0.00031	  -0.00002	   0.00114
                     24	  -0.00153	  -0.00032	  -0.00014	  -0.00030	  -0.00043	  -0.00019	   0.00114
                     28	  -0.00133	  -0.00037	  -0.00020	  -0.00022	  -0.00031	  -0.00015	   0.00102
                     30	  -0.00152	  -0.00059	  -0.00029	  -0.00021	  -0.00018	   0.00010	   0.00131
                     35	  -0.00150	  -0.00074	  -0.00045	  -0.00019	   0.00011	   0.00044	   0.00141
                     45	  -0.00126	  -0.00066	  -0.00038	  -0.00013	   0.00014	   0.00037	   0.00142
                     50	  -0.00093	  -0.00058	  -0.00046	  -0.00004	   0.00039	   0.00059	   0.00117
                     55	  -0.00174	  -0.00066	  -0.00070	   0.00003	   0.00127	   0.00079	   0.00111
                     60	  -0.00065	  -0.00029	  -0.00084	  -0.00003	  -0.00038	   0.00080	   0.00081
            </tableData>
          </table>
       </product>
    </function>
    <function name="aero/c/CFXDRDMN">
    <description>DRAG DUE TO MACH DUE TO RUDDER DEFLECTION</description>
    <product>
          <property>fcs/rudder-deg</property>
          <table>
            <independentVar lookup="row">velocities/mach</independentVar>
            <independentVar lookup="column">aero/alpha-deg</independentVar>
            <tableData>
                                -10	         -5	         -2	       0.01	          1	          2	          6	          7	         10
                    0.2	   0.00027	   0.00012	   0.00009	   0.00008	   0.00009	   0.00010	   0.00020	   0.00024	   0.00041
                    0.4	   0.00018	   0.00008	   0.00006	   0.00006	   0.00006	   0.00006	   0.00013	   0.00016	   0.00027
                    0.6	   0.00000	   0.00000	   0.00000	   0.00000	   0.00000	   0.00000	   0.00000	   0.00000	   0.00000
                    0.8	  -0.00032	  -0.00016	  -0.00011	  -0.00011	  -0.00012	  -0.00013	  -0.00026	  -0.00031	  -0.00050
                   0.86	  -0.00046	  -0.00023	  -0.00017	  -0.00017	  -0.00018	  -0.00020	  -0.00038	  -0.00046	  -0.00072
                   0.88	  -0.00052	  -0.00026	  -0.00019	  -0.00019	  -0.00020	  -0.00023	  -0.00043	  -0.00052	  -0.00081
                   0.91	  -0.00060	  -0.00030	  -0.00023	  -0.00023	  -0.00025	  -0.00027	  -0.00052	  -0.00062	  -0.00095
                  0.955	  -0.00076	  -0.00040	  -0.00031	  -0.00032	  -0.00034	  -0.00038	  -0.00070	  -0.00081	  -0.00118
                   0.98	  -0.00096	  -0.00050	  -0.00040	  -0.00042	  -0.00045	  -0.00051	  -0.00088	  -0.00099	  -0.00137
                   0.99	  -0.00119	  -0.00062	  -0.00050	  -0.00054	  -0.00058	  -0.00065	  -0.00108	  -0.00121	  -0.00159
                      2	  -0.00435	  -0.00161	  -0.00067	  -0.00041	  -0.00040	  -0.00046	  -0.00155	  -0.00203	  -0.00394
                    2.4	  -0.00341	  -0.00123	  -0.00047	  -0.00025	  -0.00022	  -0.00025	  -0.00094	  -0.00125	  -0.00251
            </tableData>
          </table>
       </product>
    </function>
    <function name="aero/c/CFXDSL">
    <description>DRAG DUE TO SLATS</description>
          <table>
            <independentVar lookup="row">aero/alpha-deg</independentVar>
            <independentVar lookup="column">fcs/slats-deg</independentVar>
            <tableData>
                                  0	         10	         23
                    -20	   0.00000	   0.01144	   0.01208
                    -10	   0.00000	   0.00421	   0.00454
                     -8	   0.00000	   0.00290	   0.00316
                     -4	   0.00000	   0.00074	   0.00083
                      0	   0.00000	  -0.00023	  -0.00027
                      4	   0.00000	  -0.00101	  -0.00123
                      8	   0.00000	  -0.00126	  -0.00166
                     12	   0.00000	  -0.00071	  -0.00131
                     14	   0.00000	  -0.00021	  -0.00091
                     16	   0.00000	  -0.00005	  -0.00083
                     20	   0.00000	   0.00281	   0.00187
                     24	   0.00000	   0.00436	   0.00344
                     28	   0.00000	   0.00680	   0.00607
                     30	   0.00000	   0.00850	   0.00746
                     35	   0.00000	   0.01059	   0.00919
                     45	   0.00000	   0.02293	   0.01535
                     50	   0.00000	   0.02451	   0.01322
                     55	   0.00000	  -0.01349	  -0.01613
                     60	   0.00000	   0.04210	   0.04103
            </tableData>
          </table>
    </function>
    <function name="aero/c/CFXDSPL">
    <description>DRAG DUE TO SPOILERS LEFT</description>
          <table>
            <independentVar lookup="row">aero/alpha-deg</independentVar>
            <independentVar lookup="column">aero/beta-deg</independentVar>
            <independentVar lookup="table">fcs/spoiler-left-deg</independentVar>
              <tableData breakPoint="0">
                              -20	       -10	        -5	         0	         5	        10	        20
                    -20	   0.00000	   0.00000	   0.00000	   0.00000	   0.00000	   0.00000	   0.00000
                    -10	   0.00000	   0.00000	   0.00000	   0.00000	   0.00000	   0.00000	   0.00000
                     -8	   0.00000	   0.00000	   0.00000	   0.00000	   0.00000	   0.00000	   0.00000
                     -4	   0.00000	   0.00000	   0.00000	   0.00000	   0.00000	   0.00000	   0.00000
                      0	   0.00000	   0.00000	   0.00000	   0.00000	   0.00000	   0.00000	   0.00000
                      4	   0.00000	   0.00000	   0.00000	   0.00000	   0.00000	   0.00000	   0.00000
                      8	   0.00000	   0.00000	   0.00000	   0.00000	   0.00000	   0.00000	   0.00000
                     12	   0.00000	   0.00000	   0.00000	   0.00000	   0.00000	   0.00000	   0.00000
                     14	   0.00000	   0.00000	   0.00000	   0.00000	   0.00000	   0.00000	   0.00000
                     16	   0.00000	   0.00000	   0.00000	   0.00000	   0.00000	   0.00000	   0.00000
                     20	   0.00000	   0.00000	   0.00000	   0.00000	   0.00000	   0.00000	   0.00000
                     24	   0.00000	   0.00000	   0.00000	   0.00000	   0.00000	   0.00000	   0.00000
                     28	   0.00000	   0.00000	   0.00000	   0.00000	   0.00000	   0.00000	   0.00000
                     30	   0.00000	   0.00000	   0.00000	   0.00000	   0.00000	   0.00000	   0.00000
                     35	   0.00000	   0.00000	   0.00000	   0.00000	   0.00000	   0.00000	   0.00000
                     45	   0.00000	   0.00000	   0.00000	   0.00000	   0.00000	   0.00000	   0.00000
                     50	   0.00000	   0.00000	   0.00000	   0.00000	   0.00000	   0.00000	   0.00000
                     55	   0.00000	   0.00000	   0.00000	   0.00000	   0.00000	   0.00000	   0.00000
                     60	   0.00000	   0.00000	   0.00000	   0.00000	   0.00000	   0.00000	   0.00000
              </tableData>
              <tableData breakPoint="20">
                              -20	       -10	        -5	         0	         5	        10	        20
                    -20	   0.01758	   0.01957	   0.01851	   0.01854	   0.01726	   0.01572	   0.01172
                    -10	   0.01056	   0.01099	   0.00996	   0.00967	   0.00906	   0.00820	   0.00590
                     -8	   0.00894	   0.00869	   0.00804	   0.00792	   0.00747	   0.00663	   0.00448
                     -4	   0.00601	   0.00319	   0.00485	   0.00424	   0.00426	   0.00360	   0.00221
                      0	   0.00253	   0.00188	   0.00164	   0.00149	   0.00119	   0.00090	  -0.00013
                      4	  -0.00094	  -0.00135	  -0.00141	  -0.00174	  -0.00201	  -0.00236	  -0.00252
                      8	  -0.00485	  -0.00454	  -0.00482	  -0.00541	  -0.00559	  -0.00577	  -0.00541
                     12	  -0.00756	  -0.00831	  -0.00853	  -0.00955	  -0.00949	  -0.00948	  -0.00836
                     14	  -0.00923	  -0.01022	  -0.01049	  -0.01123	  -0.01135	  -0.01110	  -0.00982
                     16	  -0.00920	  -0.01186	  -0.01234	  -0.01242	  -0.01319	  -0.01308	  -0.01134
                     20	  -0.01263	  -0.01478	  -0.01569	  -0.01574	  -0.01686	  -0.01692	  -0.01385
                     24	  -0.01413	  -0.01748	  -0.01928	  -0.01972	  -0.02056	  -0.01991	  -0.01644
                     28	  -0.01373	  -0.01986	  -0.02272	  -0.02382	  -0.02340	  -0.02246	  -0.01894
                     30	  -0.01501	  -0.01915	  -0.02286	  -0.02619	  -0.02426	  -0.02386	  -0.01884
                     35	  -0.02066	  -0.02293	  -0.02497	  -0.02953	  -0.02841	  -0.02640	  -0.02024
                     45	  -0.02451	  -0.02530	  -0.03130	  -0.03136	  -0.03260	  -0.02958	  -0.02544
                     50	  -0.02304	  -0.02696	  -0.03196	  -0.03974	  -0.04012	  -0.03928	  -0.02378
                     55	  -0.03206	  -0.03315	  -0.03761	  -0.03999	  -0.03895	  -0.02526	  -0.00642
                     60	  -0.03365	  -0.03373	  -0.02489	  -0.03875	  -0.04005	  -0.03186	  -0.02436
              </tableData>
              <tableData breakPoint="50">
                              -20	       -10	        -5	         0	         5	        10	        20
                    -20	   0.03103	   0.03303	   0.03199	   0.03183	   0.02887	   0.02653	   0.01964
                    -10	   0.02001	   0.02076	   0.01964	   0.01892	   0.01755	   0.01590	   0.01152
                     -8	   0.01713	   0.01738	   0.01649	   0.01612	   0.01518	   0.01345	   0.00946
                     -4	   0.01225	   0.00930	   0.01140	   0.01029	   0.01014	   0.00873	   0.00583
                      0	   0.00696	   0.00669	   0.00639	   0.00594	   0.00526	   0.00447	   0.00207
                      4	   0.00184	   0.00166	   0.00150	   0.00078	   0.00005	  -0.00074	  -0.00177
                      8	  -0.00421	  -0.00367	  -0.00412	  -0.00519	  -0.00594	  -0.00640	  -0.00661
                     12	  -0.00890	  -0.00965	  -0.01029	  -0.01187	  -0.01229	  -0.01263	  -0.01135
                     14	  -0.01075	  -0.01258	  -0.01367	  -0.01495	  -0.01550	  -0.01551	  -0.01410
                     16	  -0.01228	  -0.01581	  -0.01646	  -0.01725	  -0.01877	  -0.01882	  -0.01678
                     20	  -0.01618	  -0.02081	  -0.02311	  -0.02332	  -0.02508	  -0.02523	  -0.02086
                     24	  -0.02014	  -0.02612	  -0.02878	  -0.03038	  -0.03140	  -0.03088	  -0.02596
                     28	  -0.02174	  -0.03070	  -0.03455	  -0.03772	  -0.03766	  -0.03587	  -0.03039
                     30	  -0.02490	  -0.03098	  -0.03670	  -0.04135	  -0.04027	  -0.03712	  -0.03103
                     35	  -0.03317	  -0.03749	  -0.04252	  -0.04769	  -0.04572	  -0.04417	  -0.03542
                     45	  -0.04320	  -0.04944	  -0.05487	  -0.05660	  -0.05195	  -0.04778	  -0.04662
                     50	  -0.04504	  -0.05864	  -0.05533	  -0.06726	  -0.06687	  -0.06777	  -0.04598
                     55	  -0.05184	  -0.06641	  -0.07971	  -0.06900	  -0.07377	  -0.04750	  -0.02714
                     60	  -0.05844	  -0.06058	  -0.05439	  -0.07000	  -0.05977	  -0.06117	  -0.04620
              </tableData>
          </table>
    </function>
    <function name="aero/c/CFXDSPR">
    <description>DRAG DUE TO SPOILERS RIGHT</description>
          <table>
            <independentVar lookup="row">aero/alpha-deg</independentVar>
            <independentVar lookup="column">aero/beta-deg</independentVar>
            <independentVar lookup="table">fcs/spoiler-right-deg</independentVar>
              <tableData breakPoint="0">
                              -20	       -10	        -5	         0	         5	        10	        20
                    -20	   0.00000	   0.00000	   0.00000	   0.00000	   0.00000	   0.00000	   0.00000
                    -10	   0.00000	   0.00000	   0.00000	   0.00000	   0.00000	   0.00000	   0.00000
                     -8	   0.00000	   0.00000	   0.00000	   0.00000	   0.00000	   0.00000	   0.00000
                     -4	   0.00000	   0.00000	   0.00000	   0.00000	   0.00000	   0.00000	   0.00000
                      0	   0.00000	   0.00000	   0.00000	   0.00000	   0.00000	   0.00000	   0.00000
                      4	   0.00000	   0.00000	   0.00000	   0.00000	   0.00000	   0.00000	   0.00000
                      8	   0.00000	   0.00000	   0.00000	   0.00000	   0.00000	   0.00000	   0.00000
                     12	   0.00000	   0.00000	   0.00000	   0.00000	   0.00000	   0.00000	   0.00000
                     14	   0.00000	   0.00000	   0.00000	   0.00000	   0.00000	   0.00000	   0.00000
                     16	   0.00000	   0.00000	   0.00000	   0.00000	   0.00000	   0.00000	   0.00000
                     20	   0.00000	   0.00000	   0.00000	   0.00000	   0.00000	   0.00000	   0.00000
                     24	   0.00000	   0.00000	   0.00000	   0.00000	   0.00000	   0.00000	   0.00000
                     28	   0.00000	   0.00000	   0.00000	   0.00000	   0.00000	   0.00000	   0.00000
                     30	   0.00000	   0.00000	   0.00000	   0.00000	   0.00000	   0.00000	   0.00000
                     35	   0.00000	   0.00000	   0.00000	   0.00000	   0.00000	   0.00000	   0.00000
                     45	   0.00000	   0.00000	   0.00000	   0.00000	   0.00000	   0.00000	   0.00000
                     50	   0.00000	   0.00000	   0.00000	   0.00000	   0.00000	   0.00000	   0.00000
                     55	   0.00000	   0.00000	   0.00000	   0.00000	   0.00000	   0.00000	   0.00000
                     60	   0.00000	   0.00000	   0.00000	   0.00000	   0.00000	   0.00000	   0.00000
              </tableData>
              <tableData breakPoint="20">
                              -20	       -10	        -5	         0	         5	        10	        20
                    -20	   0.01758	   0.01957	   0.01851	   0.01854	   0.01726	   0.01572	   0.01172
                    -10	   0.01056	   0.01099	   0.00996	   0.00967	   0.00906	   0.00820	   0.00590
                     -8	   0.00894	   0.00869	   0.00804	   0.00792	   0.00747	   0.00663	   0.00448
                     -4	   0.00601	   0.00319	   0.00485	   0.00424	   0.00426	   0.00360	   0.00221
                      0	   0.00253	   0.00188	   0.00164	   0.00149	   0.00119	   0.00090	  -0.00013
                      4	  -0.00094	  -0.00135	  -0.00141	  -0.00174	  -0.00201	  -0.00236	  -0.00252
                      8	  -0.00485	  -0.00454	  -0.00482	  -0.00541	  -0.00559	  -0.00577	  -0.00541
                     12	  -0.00756	  -0.00831	  -0.00853	  -0.00955	  -0.00949	  -0.00948	  -0.00836
                     14	  -0.00923	  -0.01022	  -0.01049	  -0.01123	  -0.01135	  -0.01110	  -0.00982
                     16	  -0.00920	  -0.01186	  -0.01234	  -0.01242	  -0.01319	  -0.01308	  -0.01134
                     20	  -0.01263	  -0.01478	  -0.01569	  -0.01574	  -0.01686	  -0.01692	  -0.01385
                     24	  -0.01413	  -0.01748	  -0.01928	  -0.01972	  -0.02056	  -0.01991	  -0.01644
                     28	  -0.01373	  -0.01986	  -0.02272	  -0.02382	  -0.02340	  -0.02246	  -0.01894
                     30	  -0.01501	  -0.01915	  -0.02286	  -0.02619	  -0.02426	  -0.02386	  -0.01884
                     35	  -0.02066	  -0.02293	  -0.02497	  -0.02953	  -0.02841	  -0.02640	  -0.02024
                     45	  -0.02451	  -0.02530	  -0.03130	  -0.03136	  -0.03260	  -0.02958	  -0.02544
                     50	  -0.02304	  -0.02696	  -0.03196	  -0.03974	  -0.04012	  -0.03928	  -0.02378
                     55	  -0.03206	  -0.03315	  -0.03761	  -0.03999	  -0.03895	  -0.02526	  -0.00642
                     60	  -0.03365	  -0.03373	  -0.02489	  -0.03875	  -0.04005	  -0.03186	  -0.02436
              </tableData>
              <tableData breakPoint="50">
                              -20	       -10	        -5	         0	         5	        10	        20
                    -20	   0.03103	   0.03303	   0.03199	   0.03183	   0.02887	   0.02653	   0.01964
                    -10	   0.02001	   0.02076	   0.01964	   0.01892	   0.01755	   0.01590	   0.01152
                     -8	   0.01713	   0.01738	   0.01649	   0.01612	   0.01518	   0.01345	   0.00946
                     -4	   0.01225	   0.00930	   0.01140	   0.01029	   0.01014	   0.00873	   0.00583
                      0	   0.00696	   0.00669	   0.00639	   0.00594	   0.00526	   0.00447	   0.00207
                      4	   0.00184	   0.00166	   0.00150	   0.00078	   0.00005	  -0.00074	  -0.00177
                      8	  -0.00421	  -0.00367	  -0.00412	  -0.00519	  -0.00594	  -0.00640	  -0.00661
                     12	  -0.00890	  -0.00965	  -0.01029	  -0.01187	  -0.01229	  -0.01263	  -0.01135
                     14	  -0.01075	  -0.01258	  -0.01367	  -0.01495	  -0.01550	  -0.01551	  -0.01410
                     16	  -0.01228	  -0.01581	  -0.01646	  -0.01725	  -0.01877	  -0.01882	  -0.01678
                     20	  -0.01618	  -0.02081	  -0.02311	  -0.02332	  -0.02508	  -0.02523	  -0.02086
                     24	  -0.02014	  -0.02612	  -0.02878	  -0.03038	  -0.03140	  -0.03088	  -0.02596
                     28	  -0.02174	  -0.03070	  -0.03455	  -0.03772	  -0.03766	  -0.03587	  -0.03039
                     30	  -0.02490	  -0.03098	  -0.03670	  -0.04135	  -0.04027	  -0.03712	  -0.03103
                     35	  -0.03317	  -0.03749	  -0.04252	  -0.04769	  -0.04572	  -0.04417	  -0.03542
                     45	  -0.04320	  -0.04944	  -0.05487	  -0.05660	  -0.05195	  -0.04778	  -0.04662
                     50	  -0.04504	  -0.05864	  -0.05533	  -0.06726	  -0.06687	  -0.06777	  -0.04598
                     55	  -0.05184	  -0.06641	  -0.07971	  -0.06900	  -0.07377	  -0.04750	  -0.02714
                     60	  -0.05844	  -0.06058	  -0.05439	  -0.07000	  -0.05977	  -0.06117	  -0.04620
              </tableData>
          </table>
    </function>
    <function name="aero/c/CFXFLAPS">
    <description>DRAG DUE TO FLAPS INBOARD</description>
    <product>
          <property>fcs/flap-pos-deg</property>
          <table>
            <independentVar lookup="row">aero/alpha-deg</independentVar>
            <independentVar lookup="column">fcs/pitch-pos-deg</independentVar>
            <tableData>
                                -20	        -10	         -5	          0	          5	         10	         20
                    -20	  -0.00196	  -0.00185	  -0.00180	  -0.00191	  -0.00197	  -0.00202	  -0.00202
                    -10	  -0.00036	  -0.00035	  -0.00038	  -0.00037	  -0.00038	  -0.00035	  -0.00138
                     -8	  -0.00011	  -0.00010	  -0.00009	  -0.00011	  -0.00014	  -0.00004	   0.00022
                     -4	   0.00041	   0.00038	   0.00028	   0.00033	   0.00050	   0.00062	   0.00072
                      0	   0.00078	   0.00069	   0.00086	   0.00103	   0.00115	   0.00121	   0.00127
                      4	   0.00106	   0.00149	   0.00163	   0.00173	   0.00177	   0.00179	   0.00178
                      8	   0.00185	   0.00226	   0.00232	   0.00230	   0.00231	   0.00231	   0.00233
                     12	   0.00272	   0.00286	   0.00283	   0.00281	   0.00279	   0.00282	   0.00270
                     14	   0.00310	   0.00309	   0.00308	   0.00306	   0.00302	   0.00300	   0.00294
                     16	   0.00335	   0.00331	   0.00329	   0.00327	   0.00326	   0.00320	   0.00323
                     20	   0.00372	   0.00368	   0.00364	   0.00358	   0.00358	   0.00361	   0.00354
                     24	   0.00405	   0.00399	   0.00395	   0.00395	   0.00391	   0.00393	   0.00393
                     28	   0.00415	   0.00411	   0.00407	   0.00406	   0.00405	   0.00400	   0.00408
                     30	   0.00410	   0.00401	   0.00406	   0.00399	   0.00404	   0.00393	   0.00416
                     35	   0.00401	   0.00400	   0.00385	   0.00387	   0.00404	   0.00394	   0.00396
                     45	   0.00361	   0.00349	   0.00353	   0.00346	   0.00351	   0.00350	   0.00352
                     50	   0.00347	   0.00338	   0.00344	   0.00336	   0.00355	   0.00384	   0.00363
                     55	   0.00302	   0.00287	   0.00322	   0.00154	   0.00332	   0.00264	   0.00282
                     60	   0.00248	   0.00328	   0.00265	   0.00229	   0.00230	   0.00274	   0.00270
            </tableData>
          </table>
       </product>
    </function>
    <function name="aero/c/CFXFLAPSOB">
    <description>DRAG DUE TO FLAPS OUTBOARD</description>
    <product>
          <property>fcs/flap-ob-pos-deg</property>
          <table>
            <independentVar lookup="row">aero/alpha-deg</independentVar>
            <independentVar lookup="column">fcs/pitch-pos-deg</independentVar>
            <tableData>
                                -20	        -10	         -5	          0	          5	         10	         20
                    -20	   0.00227	  -0.00015	  -0.00119	  -0.00213	  -0.00302	  -0.00363	  -0.00425
                    -10	   0.00298	   0.00118	   0.00043	  -0.00013	  -0.00057	  -0.00085	   0.00027
                     -8	   0.00308	   0.00138	   0.00074	   0.00024	  -0.00013	  -0.00036	   0.00013
                     -4	   0.00320	   0.00182	   0.00134	   0.00093	   0.00068	   0.00079	   0.00168
                      0	   0.00334	   0.00230	   0.00166	   0.00144	   0.00153	   0.00187	   0.00310
                      4	   0.00377	   0.00219	   0.00199	   0.00208	   0.00240	   0.00292	   0.00446
                      8	   0.00294	   0.00232	   0.00240	   0.00272	   0.00320	   0.00386	   0.00561
                     12	   0.00266	   0.00252	   0.00277	   0.00326	   0.00387	   0.00464	   0.00663
                     14	   0.00253	   0.00261	   0.00295	   0.00351	   0.00417	   0.00506	   0.00714
                     16	   0.00243	   0.00269	   0.00312	   0.00375	   0.00447	   0.00538	   0.00762
                     20	   0.00214	   0.00264	   0.00323	   0.00404	   0.00487	   0.00588	   0.00830
                     24	   0.00153	   0.00231	   0.00306	   0.00402	   0.00501	   0.00617	   0.00874
                     28	   0.00074	   0.00193	   0.00280	   0.00394	   0.00502	   0.00627	   0.00905
                     30	   0.00029	   0.00161	   0.00260	   0.00381	   0.00495	   0.00632	   0.00902
                     35	  -0.00071	   0.00104	   0.00230	   0.00367	   0.00498	   0.00628	   0.00927
                     45	  -0.00242	   0.00027	   0.00188	   0.00364	   0.00496	   0.00642	   0.00980
                     50	  -0.00297	   0.00005	   0.00166	   0.00372	   0.00508	   0.00669	   0.00968
                     55	  -0.00527	  -0.00180	   0.00069	   0.00231	   0.00364	   0.00481	   0.00809
                     60	  -0.00817	  -0.00413	  -0.00156	   0.00269	   0.00442	   0.00513	   0.00527
            </tableData>
          </table>
       </product>
    </function>
    <function name="aero/c/CFXGEAR">
    <description>DRAG DUE TO GEAR</description>
    <product>
          <property>gear/gear-pos-norm</property>
          <table>
            <independentVar lookup="row">aero/alpha-deg</independentVar>
            <independentVar lookup="column">aero/beta-deg</independentVar>
            <tableData>
                                -20	        -10	         -5	          0	          5	         10	         20
                    -20	   0.00119	   0.00119	   0.00094	   0.00075	   0.00097	   0.00123	   0.00124
                    -10	   0.00143	   0.00114	   0.00076	   0.00048	   0.00076	   0.00114	   0.00144
                     -8	   0.00127	   0.00106	   0.00067	   0.00054	   0.00067	   0.00107	   0.00127
                     -4	   0.00098	   0.00087	   0.00050	   0.00038	   0.00050	   0.00087	   0.00098
                      0	   0.00059	   0.00065	   0.00042	   0.00029	   0.00042	   0.00065	   0.00060
                      4	   0.00020	   0.00012	   0.00061	   0.00041	   0.00061	   0.00013	   0.00020
                      8	   0.00115	   0.00303	   0.00183	   0.00090	   0.00184	   0.00304	   0.00114
                     12	   0.00515	   0.00440	   0.00690	   0.00199	   0.00694	   0.00440	   0.00516
                     14	   0.00690	   0.01526	  -0.00360	   0.00299	  -0.00365	   0.01527	   0.00692
                     16	   0.00818	   0.00259	   0.00434	   0.00273	   0.00421	   0.00256	   0.00810
                     20	   0.00934	   0.00325	   0.00532	   0.00490	   0.00535	   0.00319	   0.00932
                     24	   0.01052	   0.00850	   0.00690	   0.00636	   0.00680	   0.00845	   0.01058
                     28	   0.01215	   0.01084	   0.01215	   0.01010	   0.01210	   0.01093	   0.01207
                     30	   0.01324	   0.01419	   0.01776	   0.01297	   0.01763	   0.01359	   0.01341
                     35	   0.00993	   0.00976	  -0.07088	   0.00915	  -0.07090	   0.00976	   0.00983
                     45	   0.00204	   0.00451	   0.01471	   0.01282	   0.01460	   0.00447	   0.00194
                     50	  -0.00463	  -0.00365	   0.02618	   0.01692	   0.02418	  -0.00305	  -0.00419
                     55	   0.01596	  -0.00138	  -0.00485	   0.00891	  -0.00068	  -0.00200	   0.01585
                     60	  -0.00149	  -0.00054	   0.00268	   0.00962	   0.00232	  -0.00022	  -0.00306
            </tableData>
          </table>
       </product>
    </function>
    <function name="aero/c/CFXMN">
    <description>DRAG DUE TO MACH</description>
          <table>
            <independentVar lookup="row">velocities/mach</independentVar>
            <independentVar lookup="column">aero/alpha-deg</independentVar>
            <tableData>
                                -10	         -5	         -2	       0.01	          1	          2	          6	          7	         10
                    0.2	  -0.00415	  -0.00094	  -0.00017	  -0.00015	  -0.00032	  -0.00062	  -0.00275	  -0.00367	  -0.00697
                    0.4	  -0.00276	  -0.00063	  -0.00011	  -0.00010	  -0.00022	  -0.00042	  -0.00186	  -0.00242	  -0.00462
                    0.6	   0.00000	   0.00000	   0.00000	   0.00000	   0.00000	   0.00000	   0.00001	   0.00000	   0.00000
                    0.8	   0.00429	   0.00111	   0.00021	   0.00023	   0.00046	   0.00084	   0.00375	   0.00471	   0.00840
                   0.86	   0.00586	   0.00150	   0.00029	   0.00036	   0.00070	   0.00125	   0.00540	   0.00687	   0.01199
                   0.88	   0.00665	   0.00162	   0.00032	   0.00042	   0.00080	   0.00141	   0.00602	   0.00768	   0.01327
                   0.91	   0.00759	   0.00182	   0.00037	   0.00052	   0.00099	   0.00170	   0.00704	   0.00903	   0.01540
                  0.955	   0.00929	   0.00221	   0.00048	   0.00077	   0.00141	   0.00237	   0.00895	   0.01125	   0.01878
                   0.98	   0.01151	   0.00268	   0.00064	   0.00111	   0.00194	   0.00315	   0.01092	   0.01334	   0.02090
                   0.99	   0.01432	   0.00326	   0.00082	   0.00143	   0.00246	   0.00394	   0.01289	   0.01557	   0.02309
                      2	   0.08014	   0.02568	   0.00697	   0.00209	   0.00204	   0.00358	   0.02606	   0.03574	   0.07418
                    2.4	   0.06416	   0.02094	   0.00574	   0.00148	   0.00114	   0.00193	   0.01629	   0.02265	   0.04774
            </tableData>
          </table>
    </function>
    <function name="aero/c/CFZB">
    <description>BASE LIFT</description>
          <table>
            <independentVar lookup="row">aero/alpha-deg</independentVar>
            <independentVar lookup="column">fcs/pitch-pos-deg</independentVar>
            <tableData>
                                -20	        -10	         -5	          0	          5	         10	         20
                    -20	  -1.33495	  -1.33019	  -1.25252	  -1.15471	  -1.05524	  -0.96082	  -0.76397
                    -10	  -0.88902	  -0.79525	  -0.69963	  -0.59071	  -0.48487	  -0.38272	  -0.18617
                     -8	  -0.77966	  -0.66754	  -0.56730	  -0.46132	  -0.35400	  -0.25283	  -0.06155
                     -4	  -0.54765	  -0.40539	  -0.30300	  -0.19957	  -0.09739	   0.00111	   0.18341
                      0	  -0.30823	  -0.14315	  -0.04446	   0.05599	   0.15548	   0.25318	   0.42850
                      4	  -0.06219	   0.11896	   0.21758	   0.31966	   0.41952	   0.51604	   0.66939
                      8	   0.19369	   0.37917	   0.47844	   0.58839	   0.68638	   0.77608	   0.90170
                     12	   0.43975	   0.63050	   0.73802	   0.84608	   0.93516	   1.01387	   1.11461
                     14	   0.55871	   0.75528	   0.85446	   0.96493	   1.05207	   1.12070	   1.21326
                     16	   0.67582	   0.86552	   0.97238	   1.07907	   1.16211	   1.23258	   1.30576
                     20	   0.87964	   1.07147	   1.17298	   1.28583	   1.36466	   1.41734	   1.46091
                     24	   1.05771	   1.24804	   1.35419	   1.46099	   1.52918	   1.56642	   1.57707
                     28	   1.20863	   1.39697	   1.49767	   1.60203	   1.64824	   1.66947	   1.64985
                     30	   1.26981	   1.45744	   1.55739	   1.65728	   1.69724	   1.70958	   1.67530
                     35	   1.45573	   1.62307	   1.71094	   1.80138	   1.82384	   1.82579	   1.75416
                     45	   1.66037	   1.76044	   1.83175	   1.90439	   1.88706	   1.83848	   1.71147
                     50	   1.63969	   1.71518	   1.77085	   1.82822	   1.79165	   1.73439	   1.59641
                     55	   1.59701	   1.61828	   1.65443	   1.70337	   1.65948	   1.58905	   1.44860
                     60	   1.46484	   1.44883	   1.47739	   1.50629	   1.44623	   1.36897	   1.23629
            </tableData>
          </table>
    </function>
    <function name="aero/c/CFZBRK">
    <description>LIFT DUE TO SPEEDBRAKE</description>
    <product>
          <property>fcs/speedbrake-pos-deg</property>
          <table>
            <independentVar lookup="row">aero/alpha-deg</independentVar>
            <independentVar lookup="column">aero/beta-deg</independentVar>
            <tableData>
                                -20	        -10	         -5	          0	          5	         10	         20
                    -20	   0.00322	   0.00368	   0.00384	   0.00328	   0.00389	   0.00376	   0.00251
                    -10	   0.00410	  -0.00179	  -0.00232	  -0.00116	  -0.00232	  -0.00181	   0.00386
                     -8	   0.00184	  -0.00137	  -0.00040	  -0.00032	  -0.00040	  -0.00146	   0.00161
                     -4	   0.00288	   0.00061	  -0.00184	  -0.00271	  -0.00184	   0.00066	   0.00303
                      0	   0.00246	   0.00053	  -0.00292	  -0.00560	  -0.00290	   0.00044	   0.00240
                      4	   0.00067	  -0.00215	  -0.00910	  -0.00936	  -0.00908	  -0.00224	   0.00048
                      8	   0.00338	   0.00178	  -0.00566	  -0.00796	  -0.00573	   0.00183	   0.00389
                     12	   0.00336	   0.01587	  -0.00097	  -0.00242	  -0.00101	   0.01570	   0.00333
                     14	   0.00151	   0.01375	   0.00532	  -0.00157	   0.00542	   0.01377	   0.00205
                     16	   0.00007	   0.01407	   0.00637	   0.00776	   0.00637	   0.01426	   0.00070
                     20	   0.00505	   0.00129	   0.01446	   0.01594	   0.01359	   0.00167	   0.00570
                     24	   0.00647	   0.00630	   0.00990	   0.00871	   0.00895	   0.00477	   0.00598
                     28	  -0.00097	   0.00739	  -0.00111	   0.00872	   0.00063	   0.00791	  -0.00181
                     30	  -0.01275	   0.00741	   0.01248	   0.00517	   0.00972	   0.00734	  -0.01363
                     35	   0.00026	   0.00586	   0.00494	   0.00539	   0.00601	   0.00573	   0.00012
                     45	  -0.01011	  -0.00449	  -0.00079	  -0.00037	  -0.00138	  -0.00438	  -0.01104
                     50	   0.00111	  -0.00430	  -0.00515	  -0.00594	  -0.00517	   0.00092	   0.00273
                     55	  -0.00584	   0.00803	   0.00749	  -0.00691	   0.00633	   0.00859	  -0.00757
                     60	   0.00738	   0.00292	   0.01068	   0.01118	   0.01054	   0.00281	   0.00506
            </tableData>
          </table>
       </product>
    </function>
    <function name="aero/c/CFZDGE">
    <description>LIFT DUE TO GROUND EFFECT</description>
          <table>
            <independentVar lookup="row">position/h-agl-m</independentVar>
            <independentVar lookup="column">aero/alpha-deg</independentVar>
            <tableData>
                                  0	          2	          4	          6	          8	         10	         12	         14	         16	         20
                      1	   0.00638	   0.04177	   0.08503	   0.14531	   0.26113	   0.31062	   0.34871	   0.23256	   0.20398	   0.28203
                      2	   0.00384	   0.02050	   0.03839	   0.05940	   0.07552	   0.10216	   0.12145	   0.14801	   0.20111	   0.29818
                      3	   0.00242	   0.01193	   0.02167	   0.03168	   0.04163	   0.05173	   0.05277	   0.06595	   0.06800	   0.06806
                      8	   0.00046	   0.00189	   0.00278	   0.00254	   0.00344	   0.00203	  -0.00725	  -0.00379	  -0.01090	  -0.02076
                     10	   0.00029	   0.00109	   0.00134	   0.00045	   0.00079	  -0.00132	  -0.01050	  -0.00784	  -0.01365	  -0.02478
                     30	   0.00000	   0.00000	   0.00000	   0.00000	   0.00000	   0.00000	   0.00000	   0.00000	   0.00000	   0.00000
            </tableData>
          </table>
    </function>
    <function name="aero/c/CFZDRD">
    <description>LIFT DUE TO RUDDER DEFLECTION</description>
    <product>
          <property>fcs/rudder-deg</property>
          <table>
            <independentVar lookup="row">aero/alpha-deg</independentVar>
            <independentVar lookup="column">aero/beta-deg</independentVar>
            <tableData>
                                -20	        -10	         -5	          0	          5	         10	         20
                    -20	  -0.00136	  -0.00083	  -0.00065	  -0.00051	  -0.00023	   0.00005	   0.00053
                    -10	  -0.00122	  -0.00089	  -0.00060	  -0.00036	  -0.00017	   0.00010	   0.00062
                     -8	  -0.00121	  -0.00084	  -0.00053	  -0.00030	  -0.00012	   0.00013	   0.00067
                     -4	  -0.00120	  -0.00072	  -0.00051	  -0.00023	  -0.00009	   0.00020	   0.00078
                      0	  -0.00116	  -0.00071	  -0.00051	  -0.00025	   0.00001	   0.00029	   0.00081
                      4	  -0.00150	  -0.00066	  -0.00045	  -0.00023	   0.00006	   0.00004	   0.00070
                      8	  -0.00100	  -0.00057	  -0.00028	  -0.00012	   0.00000	   0.00034	   0.00083
                     12	  -0.00108	  -0.00061	  -0.00018	  -0.00030	  -0.00003	   0.00032	   0.00095
                     14	  -0.00099	  -0.00030	  -0.00018	  -0.00030	   0.00004	   0.00044	   0.00102
                     16	  -0.00084	  -0.00034	   0.00002	  -0.00028	   0.00014	   0.00050	   0.00102
                     20	  -0.00097	  -0.00051	  -0.00016	  -0.00018	   0.00004	   0.00035	   0.00081
                     24	  -0.00067	  -0.00040	  -0.00034	  -0.00003	   0.00016	   0.00071	   0.00089
                     28	  -0.00060	  -0.00050	  -0.00021	  -0.00017	   0.00020	   0.00048	   0.00091
                     30	  -0.00080	  -0.00055	  -0.00043	   0.00007	   0.00011	   0.00048	   0.00094
                     35	  -0.00047	  -0.00027	  -0.00022	  -0.00004	   0.00022	   0.00040	   0.00079
                     45	  -0.00039	  -0.00026	  -0.00011	   0.00008	   0.00016	   0.00036	   0.00061
                     50	   0.00011	  -0.00018	  -0.00007	  -0.00002	   0.00012	   0.00034	   0.00023
                     55	  -0.00004	  -0.00022	   0.00006	   0.00006	   0.00009	   0.00019	   0.00040
                     60	  -0.00005	  -0.00010	   0.00006	   0.00001	  -0.00009	   0.00007	   0.00018
            </tableData>
          </table>
       </product>
    </function>
    <function name="aero/c/CFZDRDMN">
    <description>LIFT DUE TO MACH DUE TO RUDDER DEFLECTION</description>
    <product>
          <property>fcs/rudder-deg</property>
          <table>
            <independentVar lookup="row">velocities/mach</independentVar>
            <independentVar lookup="column">aero/alpha-deg</independentVar>
            <tableData>
                                -10	         -5	         -2	       0.01	          1	          2	          6	          7	         10
                    0.2	  -0.00129	  -0.00050	  -0.00003	   0.00029	   0.00047	   0.00063	   0.00130	   0.00143	   0.00195
                    0.4	  -0.00082	  -0.00031	  -0.00001	   0.00019	   0.00031	   0.00042	   0.00086	   0.00093	   0.00129
                    0.6	   0.00000	   0.00000	   0.00000	   0.00000	   0.00000	   0.00000	   0.00000	   0.00000	   0.00000
                    0.8	   0.00104	   0.00041	  -0.00006	  -0.00037	  -0.00054	  -0.00071	  -0.00142	  -0.00155	  -0.00212
                   0.86	   0.00131	   0.00049	  -0.00013	  -0.00056	  -0.00079	  -0.00102	  -0.00196	  -0.00216	  -0.00290
                   0.88	   0.00142	   0.00051	  -0.00017	  -0.00064	  -0.00089	  -0.00114	  -0.00217	  -0.00240	  -0.00317
                   0.91	   0.00149	   0.00052	  -0.00023	  -0.00079	  -0.00107	  -0.00135	  -0.00249	  -0.00275	  -0.00354
                  0.955	   0.00160	   0.00056	  -0.00038	  -0.00111	  -0.00147	  -0.00182	  -0.00304	  -0.00325	  -0.00395
                   0.98	   0.00189	   0.00069	  -0.00048	  -0.00138	  -0.00180	  -0.00223	  -0.00345	  -0.00365	  -0.00425
                   0.99	   0.00249	   0.00094	  -0.00049	  -0.00158	  -0.00210	  -0.00259	  -0.00403	  -0.00430	  -0.00498
                      2	   0.01332	   0.00856	   0.00550	   0.00360	   0.00277	   0.00201	  -0.00032	  -0.00069	  -0.00139
                    2.4	   0.00626	   0.00541	   0.00453	   0.00402	   0.00388	   0.00379	   0.00404	   0.00424	   0.00507
            </tableData>
          </table>
       </product>
    </function>
    <function name="aero/c/CFZDSL">
    <description>LIFT DUE TO SLATS</description>
          <table>
            <independentVar lookup="row">aero/alpha-deg</independentVar>
            <independentVar lookup="column">fcs/slats-deg</independentVar>
            <tableData>
                                  0	         10	         23
                    -20	   0.00000	  -0.01037	   0.00894
                    -10	   0.00000	  -0.02354	  -0.01541
                     -8	   0.00000	  -0.02404	  -0.01786
                     -4	   0.00000	  -0.02168	  -0.01908
                      0	   0.00000	  -0.02115	  -0.02145
                      4	   0.00000	  -0.01894	  -0.02151
                      8	   0.00000	  -0.01348	  -0.01702
                     12	   0.00000	  -0.00604	  -0.00899
                     14	   0.00000	  -0.00105	  -0.00298
                     16	   0.00000	   0.00000	  -0.00117
                     20	   0.00000	   0.01433	   0.01715
                     24	   0.00000	   0.02464	   0.03460
                     28	   0.00000	   0.03317	   0.04775
                     30	   0.00000	   0.04553	   0.06227
                     35	   0.00000	   0.07770	   0.10165
                     45	   0.00000	   0.09985	   0.13153
                     50	   0.00000	   0.10827	   0.14953
                     55	   0.00000	   0.11687	   0.17813
                     60	   0.00000	   0.11751	   0.19034
            </tableData>
          </table>
    </function>
    <function name="aero/c/CFZDSPL">
    <description>LIFT DUE TO SPOILERS LEFT</description>
          <table>
            <independentVar lookup="row">aero/alpha-deg</independentVar>
            <independentVar lookup="column">aero/beta-deg</independentVar>
            <independentVar lookup="table">fcs/spoiler-left-deg</independentVar>
              <tableData breakPoint="0">
                              -20	       -10	        -5	         0	         5	        10	        20
                    -20	   0.00000	   0.00000	   0.00000	   0.00000	   0.00000	   0.00000	   0.00000
                    -10	   0.00000	   0.00000	   0.00000	   0.00000	   0.00000	   0.00000	   0.00000
                     -8	   0.00000	   0.00000	   0.00000	   0.00000	   0.00000	   0.00000	   0.00000
                     -4	   0.00000	   0.00000	   0.00000	   0.00000	   0.00000	   0.00000	   0.00000
                      0	   0.00000	   0.00000	   0.00000	   0.00000	   0.00000	   0.00000	   0.00000
                      4	   0.00000	   0.00000	   0.00000	   0.00000	   0.00000	   0.00000	   0.00000
                      8	   0.00000	   0.00000	   0.00000	   0.00000	   0.00000	   0.00000	   0.00000
                     12	   0.00000	   0.00000	   0.00000	   0.00000	   0.00000	   0.00000	   0.00000
                     14	   0.00000	   0.00000	   0.00000	   0.00000	   0.00000	   0.00000	   0.00000
                     16	   0.00000	   0.00000	   0.00000	   0.00000	   0.00000	   0.00000	   0.00000
                     20	   0.00000	   0.00000	   0.00000	   0.00000	   0.00000	   0.00000	   0.00000
                     24	   0.00000	   0.00000	   0.00000	   0.00000	   0.00000	   0.00000	   0.00000
                     28	   0.00000	   0.00000	   0.00000	   0.00000	   0.00000	   0.00000	   0.00000
                     30	   0.00000	   0.00000	   0.00000	   0.00000	   0.00000	   0.00000	   0.00000
                     35	   0.00000	   0.00000	   0.00000	   0.00000	   0.00000	   0.00000	   0.00000
                     45	   0.00000	   0.00000	   0.00000	   0.00000	   0.00000	   0.00000	   0.00000
                     50	   0.00000	   0.00000	   0.00000	   0.00000	   0.00000	   0.00000	   0.00000
                     55	   0.00000	   0.00000	   0.00000	   0.00000	   0.00000	   0.00000	   0.00000
                     60	   0.00000	   0.00000	   0.00000	   0.00000	   0.00000	   0.00000	   0.00000
              </tableData>
              <tableData breakPoint="20">
                              -20	       -10	        -5	         0	         5	        10	        20
                    -20	  -0.03751	  -0.04902	  -0.04789	  -0.05065	  -0.04694	  -0.04278	  -0.03493
                    -10	  -0.04608	  -0.05892	  -0.05797	  -0.05804	  -0.05485	  -0.05150	  -0.04144
                     -8	  -0.04501	  -0.05858	  -0.05865	  -0.05918	  -0.05654	  -0.05128	  -0.03977
                     -4	  -0.04855	  -0.05716	  -0.05823	  -0.05957	  -0.05610	  -0.05150	  -0.04020
                      0	  -0.04841	  -0.05752	  -0.05832	  -0.05911	  -0.05707	  -0.05223	  -0.04213
                      4	  -0.04758	  -0.05911	  -0.05943	  -0.06006	  -0.05749	  -0.05502	  -0.04222
                      8	  -0.05286	  -0.05986	  -0.05913	  -0.06007	  -0.05902	  -0.05558	  -0.04424
                     12	  -0.05215	  -0.05813	  -0.05720	  -0.06192	  -0.05874	  -0.05700	  -0.04456
                     14	  -0.05061	  -0.06022	  -0.05735	  -0.05978	  -0.05806	  -0.05288	  -0.04400
                     16	  -0.04461	  -0.05575	  -0.05775	  -0.05589	  -0.05680	  -0.05387	  -0.04404
                     20	  -0.04906	  -0.05053	  -0.05204	  -0.05264	  -0.05396	  -0.05513	  -0.04394
                     24	  -0.04233	  -0.04695	  -0.04864	  -0.05031	  -0.05298	  -0.05036	  -0.04372
                     28	  -0.03143	  -0.03725	  -0.05044	  -0.04959	  -0.04909	  -0.04771	  -0.03735
                     30	  -0.02318	  -0.03222	  -0.04158	  -0.04859	  -0.04015	  -0.04478	  -0.03481
                     35	  -0.00491	  -0.01440	  -0.02839	  -0.04444	  -0.04112	  -0.04466	  -0.03471
                     45	  -0.00738	  -0.01234	  -0.02318	  -0.03443	  -0.03287	  -0.02843	  -0.02223
                     50	  -0.01007	  -0.00936	  -0.01907	  -0.02909	  -0.03003	  -0.03737	  -0.00812
                     55	  -0.00906	  -0.01356	  -0.01510	  -0.02538	  -0.02335	  -0.03212	  -0.01627
                     60	  -0.00691	  -0.01133	  -0.02327	  -0.01868	  -0.01359	  -0.00950	  -0.01393
              </tableData>
              <tableData breakPoint="50">
                              -20	       -10	        -5	         0	         5	        10	        20
                    -20	  -0.05773	  -0.07499	  -0.07501	  -0.07944	  -0.07132	  -0.06684	  -0.05321
                    -10	  -0.07203	  -0.09314	  -0.09428	  -0.09379	  -0.08853	  -0.08320	  -0.06593
                     -8	  -0.07423	  -0.09435	  -0.09519	  -0.09584	  -0.09191	  -0.08386	  -0.06507
                     -4	  -0.07789	  -0.09526	  -0.09558	  -0.09779	  -0.09256	  -0.08514	  -0.06717
                      0	  -0.07932	  -0.09548	  -0.09568	  -0.09735	  -0.09519	  -0.08744	  -0.07059
                      4	  -0.07962	  -0.10082	  -0.09949	  -0.10005	  -0.09657	  -0.09113	  -0.07168
                      8	  -0.09031	  -0.10191	  -0.10118	  -0.10258	  -0.10117	  -0.09437	  -0.07827
                     12	  -0.09065	  -0.09947	  -0.09925	  -0.10482	  -0.10111	  -0.09759	  -0.07632
                     14	  -0.08942	  -0.09924	  -0.10002	  -0.10241	  -0.10081	  -0.09527	  -0.07729
                     16	  -0.08073	  -0.09546	  -0.10091	  -0.09881	  -0.09990	  -0.09388	  -0.07571
                     20	  -0.08388	  -0.09027	  -0.09430	  -0.09371	  -0.09857	  -0.09550	  -0.07741
                     24	  -0.08095	  -0.08533	  -0.08891	  -0.09085	  -0.09807	  -0.09212	  -0.07361
                     28	  -0.06206	  -0.07262	  -0.08893	  -0.09055	  -0.09302	  -0.08451	  -0.06732
                     30	  -0.05064	  -0.06654	  -0.07964	  -0.08960	  -0.08095	  -0.08333	  -0.06528
                     35	  -0.02421	  -0.05359	  -0.06615	  -0.08417	  -0.07731	  -0.07308	  -0.06668
                     45	  -0.01170	  -0.03354	  -0.04851	  -0.06656	  -0.06126	  -0.05627	  -0.04670
                     50	  -0.01728	  -0.02507	  -0.04407	  -0.05210	  -0.05263	  -0.04667	  -0.02052
                     55	  -0.01447	  -0.03519	  -0.03714	  -0.04128	  -0.03604	  -0.04434	  -0.03038
                     60	  -0.01611	  -0.02065	  -0.02649	  -0.02537	  -0.02541	  -0.02936	  -0.03671
              </tableData>
          </table>
    </function>
    <function name="aero/c/CFZDSPR">
    <description>LIFT DUE TO SPOILERS RIGHT</description>
          <table>
            <independentVar lookup="row">aero/alpha-deg</independentVar>
            <independentVar lookup="column">aero/beta-deg</independentVar>
            <independentVar lookup="table">fcs/spoiler-right-deg</independentVar>
              <tableData breakPoint="0">
                              -20	       -10	        -5	         0	         5	        10	        20
                    -20	   0.00000	   0.00000	   0.00000	   0.00000	   0.00000	   0.00000	   0.00000
                    -10	   0.00000	   0.00000	   0.00000	   0.00000	   0.00000	   0.00000	   0.00000
                     -8	   0.00000	   0.00000	   0.00000	   0.00000	   0.00000	   0.00000	   0.00000
                     -4	   0.00000	   0.00000	   0.00000	   0.00000	   0.00000	   0.00000	   0.00000
                      0	   0.00000	   0.00000	   0.00000	   0.00000	   0.00000	   0.00000	   0.00000
                      4	   0.00000	   0.00000	   0.00000	   0.00000	   0.00000	   0.00000	   0.00000
                      8	   0.00000	   0.00000	   0.00000	   0.00000	   0.00000	   0.00000	   0.00000
                     12	   0.00000	   0.00000	   0.00000	   0.00000	   0.00000	   0.00000	   0.00000
                     14	   0.00000	   0.00000	   0.00000	   0.00000	   0.00000	   0.00000	   0.00000
                     16	   0.00000	   0.00000	   0.00000	   0.00000	   0.00000	   0.00000	   0.00000
                     20	   0.00000	   0.00000	   0.00000	   0.00000	   0.00000	   0.00000	   0.00000
                     24	   0.00000	   0.00000	   0.00000	   0.00000	   0.00000	   0.00000	   0.00000
                     28	   0.00000	   0.00000	   0.00000	   0.00000	   0.00000	   0.00000	   0.00000
                     30	   0.00000	   0.00000	   0.00000	   0.00000	   0.00000	   0.00000	   0.00000
                     35	   0.00000	   0.00000	   0.00000	   0.00000	   0.00000	   0.00000	   0.00000
                     45	   0.00000	   0.00000	   0.00000	   0.00000	   0.00000	   0.00000	   0.00000
                     50	   0.00000	   0.00000	   0.00000	   0.00000	   0.00000	   0.00000	   0.00000
                     55	   0.00000	   0.00000	   0.00000	   0.00000	   0.00000	   0.00000	   0.00000
                     60	   0.00000	   0.00000	   0.00000	   0.00000	   0.00000	   0.00000	   0.00000
              </tableData>
              <tableData breakPoint="20">
                              -20	       -10	        -5	         0	         5	        10	        20
                    -20	  -0.03751	  -0.04902	  -0.04789	  -0.05065	  -0.04694	  -0.04278	  -0.03493
                    -10	  -0.04608	  -0.05892	  -0.05797	  -0.05804	  -0.05485	  -0.05150	  -0.04144
                     -8	  -0.04501	  -0.05858	  -0.05865	  -0.05918	  -0.05654	  -0.05128	  -0.03977
                     -4	  -0.04855	  -0.05716	  -0.05823	  -0.05957	  -0.05610	  -0.05150	  -0.04020
                      0	  -0.04841	  -0.05752	  -0.05832	  -0.05911	  -0.05707	  -0.05223	  -0.04213
                      4	  -0.04758	  -0.05911	  -0.05943	  -0.06006	  -0.05749	  -0.05502	  -0.04222
                      8	  -0.05286	  -0.05986	  -0.05913	  -0.06007	  -0.05902	  -0.05558	  -0.04424
                     12	  -0.05215	  -0.05813	  -0.05720	  -0.06192	  -0.05874	  -0.05700	  -0.04456
                     14	  -0.05061	  -0.06022	  -0.05735	  -0.05978	  -0.05806	  -0.05288	  -0.04400
                     16	  -0.04461	  -0.05575	  -0.05775	  -0.05589	  -0.05680	  -0.05387	  -0.04404
                     20	  -0.04906	  -0.05053	  -0.05204	  -0.05264	  -0.05396	  -0.05513	  -0.04394
                     24	  -0.04233	  -0.04695	  -0.04864	  -0.05031	  -0.05298	  -0.05036	  -0.04372
                     28	  -0.03143	  -0.03725	  -0.05044	  -0.04959	  -0.04909	  -0.04771	  -0.03735
                     30	  -0.02318	  -0.03222	  -0.04158	  -0.04859	  -0.04015	  -0.04478	  -0.03481
                     35	  -0.00491	  -0.01440	  -0.02839	  -0.04444	  -0.04112	  -0.04466	  -0.03471
                     45	  -0.00738	  -0.01234	  -0.02318	  -0.03443	  -0.03287	  -0.02843	  -0.02223
                     50	  -0.01007	  -0.00936	  -0.01907	  -0.02909	  -0.03003	  -0.03737	  -0.00812
                     55	  -0.00906	  -0.01356	  -0.01510	  -0.02538	  -0.02335	  -0.03212	  -0.01627
                     60	  -0.00691	  -0.01133	  -0.02327	  -0.01868	  -0.01359	  -0.00950	  -0.01393
              </tableData>
              <tableData breakPoint="50">
                              -20	       -10	        -5	         0	         5	        10	        20
                    -20	  -0.05773	  -0.07499	  -0.07501	  -0.07944	  -0.07132	  -0.06684	  -0.05321
                    -10	  -0.07203	  -0.09314	  -0.09428	  -0.09379	  -0.08853	  -0.08320	  -0.06593
                     -8	  -0.07423	  -0.09435	  -0.09519	  -0.09584	  -0.09191	  -0.08386	  -0.06507
                     -4	  -0.07789	  -0.09526	  -0.09558	  -0.09779	  -0.09256	  -0.08514	  -0.06717
                      0	  -0.07932	  -0.09548	  -0.09568	  -0.09735	  -0.09519	  -0.08744	  -0.07059
                      4	  -0.07962	  -0.10082	  -0.09949	  -0.10005	  -0.09657	  -0.09113	  -0.07168
                      8	  -0.09031	  -0.10191	  -0.10118	  -0.10258	  -0.10117	  -0.09437	  -0.07827
                     12	  -0.09065	  -0.09947	  -0.09925	  -0.10482	  -0.10111	  -0.09759	  -0.07632
                     14	  -0.08942	  -0.09924	  -0.10002	  -0.10241	  -0.10081	  -0.09527	  -0.07729
                     16	  -0.08073	  -0.09546	  -0.10091	  -0.09881	  -0.09990	  -0.09388	  -0.07571
                     20	  -0.08388	  -0.09027	  -0.09430	  -0.09371	  -0.09857	  -0.09550	  -0.07741
                     24	  -0.08095	  -0.08533	  -0.08891	  -0.09085	  -0.09807	  -0.09212	  -0.07361
                     28	  -0.06206	  -0.07262	  -0.08893	  -0.09055	  -0.09302	  -0.08451	  -0.06732
                     30	  -0.05064	  -0.06654	  -0.07964	  -0.08960	  -0.08095	  -0.08333	  -0.06528
                     35	  -0.02421	  -0.05359	  -0.06615	  -0.08417	  -0.07731	  -0.07308	  -0.06668
                     45	  -0.01170	  -0.03354	  -0.04851	  -0.06656	  -0.06126	  -0.05627	  -0.04670
                     50	  -0.01728	  -0.02507	  -0.04407	  -0.05210	  -0.05263	  -0.04667	  -0.02052
                     55	  -0.01447	  -0.03519	  -0.03714	  -0.04128	  -0.03604	  -0.04434	  -0.03038
                     60	  -0.01611	  -0.02065	  -0.02649	  -0.02537	  -0.02541	  -0.02936	  -0.03671
              </tableData>
          </table>
    </function>
    <function name="aero/c/CFZFLAPS">
    <description>LIFT DUE TO FLAPS INBOARD</description>
    <product>
          <property>fcs/flap-pos-deg</property>
          <table>
            <independentVar lookup="row">aero/alpha-deg</independentVar>
            <independentVar lookup="column">fcs/pitch-pos-deg</independentVar>
            <tableData>
                                -20	        -10	         -5	          0	          5	         10	         20
                    -20	   0.00840	   0.00745	   0.00699	   0.00717	   0.00698	   0.00668	   0.00642
                    -10	   0.00776	   0.00708	   0.00678	   0.00646	   0.00612	   0.00599	   0.00594
                     -8	   0.00776	   0.00674	   0.00632	   0.00604	   0.00589	   0.00566	   0.00584
                     -4	   0.00713	   0.00587	   0.00553	   0.00550	   0.00541	   0.00541	   0.00568
                      0	   0.00637	   0.00528	   0.00520	   0.00535	   0.00534	   0.00538	   0.00592
                      4	   0.00627	   0.00555	   0.00562	   0.00576	   0.00581	   0.00572	   0.00656
                      8	   0.00538	   0.00568	   0.00603	   0.00558	   0.00580	   0.00621	   0.00684
                     12	   0.00527	   0.00571	   0.00552	   0.00561	   0.00584	   0.00626	   0.00672
                     14	   0.00576	   0.00548	   0.00562	   0.00552	   0.00592	   0.00621	   0.00680
                     16	   0.00543	   0.00563	   0.00550	   0.00554	   0.00584	   0.00605	   0.00662
                     20	   0.00495	   0.00516	   0.00505	   0.00491	   0.00519	   0.00547	   0.00620
                     24	   0.00439	   0.00424	   0.00431	   0.00438	   0.00464	   0.00488	   0.00558
                     28	   0.00377	   0.00417	   0.00440	   0.00443	   0.00474	   0.00502	   0.00554
                     30	   0.00428	   0.00447	   0.00462	   0.00465	   0.00483	   0.00514	   0.00578
                     35	   0.00375	   0.00406	   0.00403	   0.00406	   0.00414	   0.00398	   0.00454
                     45	   0.00226	   0.00258	   0.00254	   0.00242	   0.00248	   0.00278	   0.00299
                     50	   0.00214	   0.00226	   0.00207	   0.00202	   0.00223	   0.00226	   0.00239
                     55	   0.00121	   0.00162	   0.00176	   0.00172	   0.00163	   0.00153	   0.00193
                     60	   0.00059	   0.00080	   0.00089	   0.00140	   0.00099	   0.00098	   0.00114
            </tableData>
          </table>
       </product>
    </function>
    <function name="aero/c/CFZFLAPSOB">
    <description>LIFT DUE TO FLAPS OUTBOARD</description>
    <product>
          <property>fcs/flap-ob-pos-deg</property>
          <table>
            <independentVar lookup="row">aero/alpha-deg</independentVar>
            <independentVar lookup="column">fcs/pitch-pos-deg</independentVar>
            <tableData>
                                -20	        -10	         -5	          0	          5	         10	         20
                    -20	   0.00718	   0.00769	   0.00975	   0.01262	   0.01546	   0.01816	   0.02407
                     -4	   0.00270	   0.00694	   0.00972	   0.01263	   0.01552	   0.01838	   0.02341
                      8	   0.00034	   0.00562	   0.00866	   0.01176	   0.01441	   0.01684	   0.02010
                     16	  -0.00161	   0.00403	   0.00698	   0.00997	   0.01229	   0.01423	   0.01610
                     28	  -0.00604	  -0.00073	   0.00199	   0.00495	   0.00627	   0.00689	   0.00626
                     45	  -0.00468	  -0.00184	   0.00004	   0.00215	   0.00157	   0.00039	  -0.00339
                     60	  -0.00029	  -0.00078	   0.00009	   0.00108	  -0.00070	  -0.00298	  -0.00690
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            </tableData>
          </table>
       </product>
    </function>
    <function name="aero/c/CFZGEAR">
    <description>LIFT DUE TO GEAR</description>
    <product>
          <property>gear/gear-pos-norm</property>
          <table>
            <independentVar lookup="row">aero/alpha-deg</independentVar>
            <independentVar lookup="column">aero/beta-deg</independentVar>
            <tableData>
                                -20	        -10	         -5	          0	          5	         10	         20
                    -20	  -0.03365	  -0.04171	  -0.04394	  -0.04392	  -0.04419	  -0.04189	  -0.03393
                     -4	  -0.00693	  -0.00963	  -0.00993	  -0.01007	  -0.00994	  -0.00962	  -0.00678
                      8	   0.01530	   0.01934	   0.01959	   0.01982	   0.01978	   0.01937	   0.01537
                     16	   0.02961	   0.03618	   0.03611	   0.03618	   0.03581	   0.03540	   0.02992
                     28	   0.04466	   0.04875	   0.04928	   0.05073	   0.04985	   0.04884	   0.04409
                     45	   0.04637	   0.04807	   0.04953	   0.04910	   0.04998	   0.04804	   0.04624
                     60	   0.02806	   0.02762	   0.02764	   0.02971	   0.02788	   0.02692	   0.02733
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            </tableData>
          </table>
       </product>
    </function>
    <function name="aero/c/CFZMN">
    <description>LIFT DUE TO MACH</description>
          <table>
            <independentVar lookup="row">velocities/mach</independentVar>
            <independentVar lookup="column">aero/alpha-deg</independentVar>
            <tableData>
                                -10	         -5	         -2	       0.01	          1	          2	          6	          7	         10
                    0.2	   0.02586	   0.01091	   0.00139	  -0.00542	  -0.00894	  -0.01244	  -0.02487	  -0.03080	  -0.03706
                    0.6	   0.00001	   0.00000	   0.00000	   0.00000	   0.00000	   0.00000	   0.00000	   0.00000	   0.00002
                   0.86	  -0.02751	  -0.01221	   0.00127	   0.01092	   0.01585	   0.02065	   0.03992	   0.04048	   0.05717
                   0.91	  -0.03231	  -0.01365	   0.00308	   0.01533	   0.02149	   0.02727	   0.05006	   0.05075	   0.06994
                   0.98	  -0.04146	  -0.01812	   0.00741	   0.02646	   0.03545	   0.04406	   0.07133	   0.07181	   0.08616
                      2	  -0.26174	  -0.16789	  -0.10512	  -0.06649	  -0.04957	  -0.03409	   0.01327	   0.01726	   0.03397
                    2.4	  -0.11986	  -0.10460	  -0.08543	  -0.07485	  -0.07167	  -0.06975	  -0.07410	  -0.08164	  -0.09550
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            </tableData>
          </table>
    </function>
    <function name="aero/c/CMM1">
    <description>BASE PITCHING MOMENT</description>
          <table>
            <independentVar lookup="row">aero/alpha-deg</independentVar>
            <independentVar lookup="column">fcs/pitch-pos-deg</independentVar>
            <tableData>
                                -20	        -10	         -5	          0	          5	         10	         20
                    -20	   0.34105	   0.33627	   0.27393	   0.19283	   0.11508	   0.04193	  -0.10990
                     -4	   0.30311	   0.19070	   0.10819	   0.02346	  -0.05809	  -0.13579	  -0.28276
                      8	   0.21248	   0.06047	  -0.02042	  -0.10514	  -0.18145	  -0.25234	  -0.34905
                     16	   0.12407	  -0.02564	  -0.10944	  -0.19489	  -0.26029	  -0.31595	  -0.37177
                     28	  -0.00828	  -0.15252	  -0.23317	  -0.31688	  -0.35217	  -0.36747	  -0.35533
                     45	  -0.23024	  -0.30326	  -0.35594	  -0.41403	  -0.40676	  -0.38147	  -0.30944
                     60	  -0.30850	  -0.32404	  -0.35717	  -0.38596	  -0.36692	  -0.34307	  -0.31918
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            </tableData>
          </table>
    </function>
    <function name="aero/c/CMMALPHADOT">
    <description>PITCH DERIVATIVE MOMENT DUE TO ALPHA DOT</description>
    <product>
          <property>aero/alphadot-rad_sec</property>
          <table>
            <independentVar lookup="row">aero/alpha-deg</independentVar>
            <tableData>
                    -20		  -0.53056
                    -10		  -0.65384
                      0		  -0.58704
                     12		  -0.47117
                     20		  -0.89380
                     30		  -0.34775
                     50		   0.71661
                     60		  -0.73902
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            </tableData>
          </table>
       </product>
    </function>
    <function name="aero/c/CMMBRK">
    <description>PITCHING MOMENT DUE TO SPEEDBRAKE</description>
    <product>
          <property>fcs/speedbrake-pos-deg</property>
          <table>
            <independentVar lookup="row">aero/alpha-deg</independentVar>
            <independentVar lookup="column">aero/beta-deg</independentVar>
            <tableData>
                                -20	        -10	         -5	          0	          5	         10	         20
                    -20	  -0.00186	   0.00100	   0.00033	  -0.00053	   0.00050	   0.00090	  -0.00180
                     -4	  -0.00028	   0.00169	   0.00196	   0.00135	   0.00194	   0.00167	  -0.00041
                      8	  -0.00175	  -0.00100	   0.00480	   0.00652	   0.00455	  -0.00106	  -0.00185
                     16	  -0.00036	  -0.01004	  -0.00671	  -0.00460	  -0.00670	  -0.01004	  -0.00118
                     28	   0.00110	  -0.00404	  -0.00155	  -0.00242	  -0.00185	  -0.00435	   0.00186
                     45	   0.00251	  -0.00340	  -0.00913	  -0.00777	  -0.00853	  -0.00377	   0.00350
                     60	  -0.00218	  -0.00561	  -0.00911	  -0.01250	  -0.00839	  -0.00482	  -0.00444
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            </tableData>
          </table>
       </product>
    </function>
    <function name="aero/c/CMMDGE">
    <description>PITCHING MOMENT DUE TO GROUND EFFECT</description>
          <table>
            <independentVar lookup="row">position/h-agl-m</independentVar>
            <independentVar lookup="column">aero/alpha-deg</independentVar>
            <tableData>
                                  0	          2	          4	          6	          8	         10	         12	         14	         16	         20
                      1	  -0.00130	  -0.01608	  -0.03734	  -0.07425	  -0.17411	  -0.20702	  -0.22438	  -0.14966	  -0.14875	  -0.22185
                      2	  -0.00120	  -0.00819	  -0.01638	  -0.02766	  -0.04104	  -0.05760	  -0.07641	  -0.09861	  -0.15271	  -0.26904
                      3	  -0.00083	  -0.00477	  -0.00925	  -0.01480	  -0.02053	  -0.02804	  -0.03314	  -0.04445	  -0.05188	  -0.06641
                      8	  -0.00013	  -0.00069	  -0.00119	  -0.00171	  -0.00143	  -0.00204	  -0.00337	  -0.00379	  -0.00298	  -0.00443
                     10	  -0.00007	  -0.00040	  -0.00064	  -0.00088	  -0.00024	  -0.00055	  -0.00166	  -0.00160	  -0.00217	  -0.00180
                     30	   0.00000	   0.00000	   0.00000	   0.00000	   0.00000	   0.00000	   0.00000	   0.00000	   0.00000	   0.00000
            </tableData>
          </table>
    </function>
    <function name="aero/c/CMMDRD">
    <description>PITCH MOMENT DUE TO RUDDER DEFLECTION</description>
    <product>
          <property>fcs/rudder-deg</property>
          <table>
            <independentVar lookup="row">aero/alpha-deg</independentVar>
            <independentVar lookup="column">aero/beta-deg</independentVar>
            <tableData>
                                -20	        -10	         -5	          0	          5	         10	         20
                    -20	   0.00157	   0.00092	   0.00065	   0.00037	  -0.00002	  -0.00041	  -0.00108
                     -4	   0.00136	   0.00089	   0.00055	   0.00023	  -0.00010	  -0.00043	  -0.00106
                      8	   0.00103	   0.00050	   0.00033	   0.00011	  -0.00010	  -0.00033	  -0.00096
                     16	   0.00078	   0.00027	   0.00017	   0.00016	  -0.00008	  -0.00027	  -0.00084
                     28	   0.00035	   0.00029	   0.00016	   0.00003	  -0.00013	  -0.00029	  -0.00055
                     45	   0.00029	   0.00009	   0.00001	  -0.00010	  -0.00012	  -0.00018	  -0.00039
                     60	  -0.00007	   0.00012	  -0.00015	   0.00001	   0.00015	   0.00008	  -0.00007
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            </tableData>
          </table>
       </product>
    </function>
    <function name="aero/c/CMMDRDMN">
    <description>PITCH MOMENT CHANGE DUE TO MACH DUE TO RUDDER DEFLECTION</description>
    <product>
          <property>fcs/rudder-deg</property>
          <table>
            <independentVar lookup="row">velocities/mach</independentVar>
            <independentVar lookup="column">aero/alpha-deg</independentVar>
            <tableData>
                                -10	         -5	         -2	       0.01	          1	          2	          6	          7	         10
                    0.2	   0.00042	   0.00017	   0.00003	  -0.00008	  -0.00013	  -0.00018	  -0.00045	  -0.00048	  -0.00054
                    0.6	   0.00000	   0.00000	   0.00000	   0.00000	   0.00000	   0.00000	   0.00000	   0.00000	   0.00000
                   0.86	  -0.00028	  -0.00014	   0.00003	   0.00016	   0.00023	   0.00029	   0.00053	   0.00065	   0.00081
                   0.91	  -0.00029	  -0.00016	   0.00007	   0.00025	   0.00033	   0.00040	   0.00068	   0.00083	   0.00095
                   0.98	  -0.00059	  -0.00035	   0.00012	   0.00047	   0.00062	   0.00073	   0.00109	   0.00129	   0.00161
                      2	  -0.00632	  -0.00405	  -0.00233	  -0.00125	  -0.00076	  -0.00029	   0.00165	   0.00215	   0.00349
                    2.4	  -0.00164	  -0.00176	  -0.00123	  -0.00085	  -0.00069	  -0.00054	   0.00031	   0.00061	   0.00159
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            </tableData>
          </table>
       </product>
    </function>
    <function name="aero/c/CMMDSL">
    <description>PITCH MOMENT DUE TO SLATS</description>
          <table>
            <independentVar lookup="row">aero/alpha-deg</independentVar>
            <independentVar lookup="column">fcs/slats-deg</independentVar>
            <tableData>
                                  0	         10	         23
                    -20	   0.00000	  -0.02337	  -0.02625
                     -4	   0.00000	  -0.00297	  -0.00546
                      8	   0.00000	   0.01212	   0.01000
                     16	   0.00000	   0.02084	   0.01855
                     28	   0.00000	   0.02152	   0.01816
                     45	   0.00000	   0.01448	   0.01315
                     60	   0.00000	   0.00601	   0.00274
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            </tableData>
          </table>
    </function>
    <function name="aero/c/CMMDSPL">
    <description>PITCHING MOMENT DUE TO SPOILERS LEFT</description>
          <table>
            <independentVar lookup="row">aero/alpha-deg</independentVar>
            <independentVar lookup="column">aero/beta-deg</independentVar>
            <independentVar lookup="table">fcs/spoiler-left-deg</independentVar>
              <tableData breakPoint="0">
                              -20	       -10	        -5	         0	         5	        10	        20
                    -20	   0.00000	   0.00000	   0.00000	   0.00000	   0.00000	   0.00000	   0.00000
                     -4	   0.00000	   0.00000	   0.00000	   0.00000	   0.00000	   0.00000	   0.00000
                      8	   0.00000	   0.00000	   0.00000	   0.00000	   0.00000	   0.00000	   0.00000
                     16	   0.00000	   0.00000	   0.00000	   0.00000	   0.00000	   0.00000	   0.00000
                     28	   0.00000	   0.00000	   0.00000	   0.00000	   0.00000	   0.00000	   0.00000
                     45	   0.00000	   0.00000	   0.00000	   0.00000	   0.00000	   0.00000	   0.00000
                     60	   0.00000	   0.00000	   0.00000	   0.00000	   0.00000	   0.00000	   0.00000
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              </tableData>
              <tableData breakPoint="20">
                              -20	       -10	        -5	         0	         5	        10	        20
                    -20	   0.00460	   0.01158	   0.01121	   0.01491	   0.01502	   0.01439	   0.01251
                     -4	   0.00415	   0.01275	   0.01654	   0.01828	   0.01863	   0.01767	   0.01406
                      8	   0.00693	   0.01456	   0.01525	   0.01801	   0.01883	   0.01828	   0.01539
                     16	   0.00582	   0.01479	   0.01403	   0.01459	   0.01813	   0.01801	   0.01528
                     28	   0.00331	   0.00557	   0.01186	   0.01460	   0.01457	   0.01527	   0.01277
                     45	   0.00001	   0.00408	   0.00748	   0.01048	   0.01159	   0.00765	   0.00673
                     60	   0.00539	   0.00647	   0.01173	   0.00910	   0.00495	   0.00139	   0.00617
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              </tableData>
              <tableData breakPoint="50">
                              -20	       -10	        -5	         0	         5	        10	        20
                    -20	   0.00525	   0.01683	   0.01820	   0.02339	   0.02240	   0.02258	   0.01821
                     -4	   0.00599	   0.02238	   0.02689	   0.02992	   0.03085	   0.02922	   0.02345
                      8	   0.01298	   0.02509	   0.02654	   0.03035	   0.03374	   0.03128	   0.02648
                     16	   0.01181	   0.02399	   0.02458	   0.02681	   0.03155	   0.03252	   0.02541
                     28	   0.01005	   0.01310	   0.02167	   0.02725	   0.02846	   0.02721	   0.02217
                     45	  -0.00045	   0.00848	   0.01184	   0.02073	   0.01769	   0.01772	   0.01403
                     60	   0.00719	   0.00889	   0.00987	   0.00869	   0.01224	   0.01143	   0.01688
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              </tableData>
          </table>
    </function>
    <function name="aero/c/CMMDSPR">
    <description>PITCHING MOMENT DUE TO SPOILERS RIGHT</description>
          <table>
            <independentVar lookup="row">aero/alpha-deg</independentVar>
            <independentVar lookup="column">aero/beta-deg</independentVar>
            <independentVar lookup="table">fcs/spoiler-right-deg</independentVar>
              <tableData breakPoint="0">
                              -20	       -10	        -5	         0	         5	        10	        20
                    -20	   0.00000	   0.00000	   0.00000	   0.00000	   0.00000	   0.00000	   0.00000
                     -4	   0.00000	   0.00000	   0.00000	   0.00000	   0.00000	   0.00000	   0.00000
                      8	   0.00000	   0.00000	   0.00000	   0.00000	   0.00000	   0.00000	   0.00000
                     16	   0.00000	   0.00000	   0.00000	   0.00000	   0.00000	   0.00000	   0.00000
                     28	   0.00000	   0.00000	   0.00000	   0.00000	   0.00000	   0.00000	   0.00000
                     45	   0.00000	   0.00000	   0.00000	   0.00000	   0.00000	   0.00000	   0.00000
                     60	   0.00000	   0.00000	   0.00000	   0.00000	   0.00000	   0.00000	   0.00000
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              </tableData>
              <tableData breakPoint="20">
                              -20	       -10	        -5	         0	         5	        10	        20
                    -20	   0.00460	   0.01158	   0.01121	   0.01491	   0.01502	   0.01439	   0.01251
                     -4	   0.00415	   0.01275	   0.01654	   0.01828	   0.01863	   0.01767	   0.01406
                      8	   0.00693	   0.01456	   0.01525	   0.01801	   0.01883	   0.01828	   0.01539
                     16	   0.00582	   0.01479	   0.01403	   0.01459	   0.01813	   0.01801	   0.01528
                     28	   0.00331	   0.00557	   0.01186	   0.01460	   0.01457	   0.01527	   0.01277
                     45	   0.00001	   0.00408	   0.00748	   0.01048	   0.01159	   0.00765	   0.00673
                     60	   0.00539	   0.00647	   0.01173	   0.00910	   0.00495	   0.00139	   0.00617
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              </tableData>
              <tableData breakPoint="50">
                              -20	       -10	        -5	         0	         5	        10	        20
                    -20	   0.00525	   0.01683	   0.01820	   0.02339	   0.02240	   0.02258	   0.01821
                     -4	   0.00599	   0.02238	   0.02689	   0.02992	   0.03085	   0.02922	   0.02345
                      8	   0.01298	   0.02509	   0.02654	   0.03035	   0.03374	   0.03128	   0.02648
                     16	   0.01181	   0.02399	   0.02458	   0.02681	   0.03155	   0.03252	   0.02541
                     28	   0.01005	   0.01310	   0.02167	   0.02725	   0.02846	   0.02721	   0.02217
                     45	  -0.00045	   0.00848	   0.01184	   0.02073	   0.01769	   0.01772	   0.01403
                     60	   0.00719	   0.00889	   0.00987	   0.00869	   0.01224	   0.01143	   0.01688
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              </tableData>
          </table>
    </function>
    <function name="aero/c/CMMFLAPS">
    <description>PITCHING MOMENT DUE TO FLAPS INBOARD</description>
    <product>
          <property>fcs/flap-pos-deg</property>
          <table>
            <independentVar lookup="row">aero/alpha-deg</independentVar>
            <independentVar lookup="column">fcs/pitch-pos-deg</independentVar>
            <tableData>
                                -20	        -10	         -5	          0	          5	         10	         20
                    -20	  -0.00120	  -0.00041	  -0.00004	  -0.00017	   0.00001	   0.00031	   0.00064
                     -4	  -0.00028	   0.00068	   0.00089	   0.00098	   0.00108	   0.00098	   0.00072
                      8	   0.00093	   0.00085	   0.00070	   0.00074	   0.00052	   0.00019	  -0.00043
                     16	   0.00058	   0.00031	   0.00029	   0.00025	  -0.00004	  -0.00017	  -0.00070
                     28	   0.00039	   0.00003	  -0.00014	  -0.00015	  -0.00043	  -0.00067	  -0.00104
                     45	  -0.00006	  -0.00036	  -0.00041	  -0.00029	  -0.00025	  -0.00065	  -0.00088
                     60	   0.00004	  -0.00012	  -0.00022	  -0.00055	  -0.00026	  -0.00030	  -0.00033
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            </tableData>
          </table>
       </product>
    </function>
    <function name="aero/c/CMMFLAPSOB">
    <description>PITCHING MOMENT DUE TO FLAPS OUTBOARD</description>
    <product>
          <property>fcs/flap-ob-pos-deg</property>
          <table>
            <independentVar lookup="row">aero/alpha-deg</independentVar>
            <independentVar lookup="column">fcs/pitch-pos-deg</independentVar>
            <tableData>
                                -20	        -10	         -5	          0	          5	         10	         20
                    -20	   0.00108	   0.00066	  -0.00101	  -0.00337	  -0.00560	  -0.00769	  -0.01230
                     -4	   0.00431	   0.00097	  -0.00129	  -0.00365	  -0.00596	  -0.00827	  -0.01217
                      8	   0.00570	   0.00147	  -0.00085	  -0.00332	  -0.00543	  -0.00725	  -0.00986
                     16	   0.00639	   0.00213	  -0.00018	  -0.00264	  -0.00447	  -0.00597	  -0.00748
                     28	   0.00754	   0.00335	   0.00119	  -0.00120	  -0.00226	  -0.00280	  -0.00241
                     45	   0.00462	   0.00251	   0.00111	  -0.00062	  -0.00033	   0.00020	   0.00254
                     60	   0.00183	   0.00142	   0.00055	  -0.00051	   0.00011	   0.00082	   0.00173
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            </tableData>
          </table>
       </product>
    </function>
    <function name="aero/c/CMMGEAR">
    <description>PITCHING MOMENT DUE TO GEAR</description>
    <product>
          <property>gear/gear-pos-norm</property>
          <table>
            <independentVar lookup="row">aero/alpha-deg</independentVar>
            <independentVar lookup="column">aero/beta-deg</independentVar>
            <tableData>
                                -20	        -10	         -5	          0	          5	         10	         20
                    -20	   0.00593	   0.00265	   0.00091	   0.00042	   0.00097	   0.00268	   0.00586
                     -4	   0.00450	   0.00136	  -0.00008	  -0.00059	  -0.00009	   0.00133	   0.00441
                      8	   0.00567	   0.00358	   0.00272	   0.00243	   0.00277	   0.00359	   0.00572
                     16	   0.00703	   0.00605	   0.00534	   0.00559	   0.00569	   0.00610	   0.00696
                     28	   0.00818	   0.00935	   0.00990	   0.00967	   0.00986	   0.00954	   0.00905
                     45	   0.00679	   0.01008	   0.01159	   0.01187	   0.01130	   0.01044	   0.00746
                     60	   0.00364	   0.00663	   0.00889	   0.00760	   0.00861	   0.00727	   0.00446
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            </tableData>
          </table>
       </product>
    </function>
    <function name="aero/c/CMMMN">
    <description>PITCHING MOMENT DUE TO MACH</description>
          <table>
            <independentVar lookup="row">velocities/mach</independentVar>
            <independentVar lookup="column">aero/alpha-deg</independentVar>
            <tableData>
                                -10	         -5	         -2	       0.01	          1	          2	          6	          7	         10
                    0.2	  -0.00848	  -0.00392	  -0.00114	   0.00118	   0.00230	   0.00346	   0.00765	   0.00882	   0.01068
                    0.6	  -0.00001	   0.00000	   0.00000	   0.00000	   0.00000	   0.00000	   0.00000	   0.00001	  -0.00001
                   0.86	   0.00679	   0.00405	   0.00021	  -0.00295	  -0.00449	  -0.00566	  -0.01162	  -0.01355	  -0.01750
                   0.91	   0.00780	   0.00486	  -0.00056	  -0.00448	  -0.00635	  -0.00781	  -0.01452	  -0.01735	  -0.02037
                   0.98	   0.01492	   0.00955	  -0.00091	  -0.00823	  -0.01151	  -0.01421	  -0.02281	  -0.02582	  -0.03181
                      2	   0.11677	   0.07252	   0.03826	   0.01692	   0.00737	  -0.00174	  -0.03991	  -0.04978	  -0.07527
                    2.4	   0.02387	   0.02728	   0.01693	   0.00945	   0.00648	   0.00364	  -0.01251	  -0.01850	  -0.03676
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            </tableData>
          </table>
    </function>
    <function name="aero/c/CMMQ">
    <description>PITCH DAMPING DERIVATIVE</description>
    <product>
          <property>aero/qb</property>
          <table>
            <independentVar lookup="row">aero/alpha-deg</independentVar>
            <tableData>
                    -20		  -1.97385
                    -10		  -2.16115
                      0		  -2.14952
                     12		  -2.20389
                     20		  -2.21520
                     30		  -1.86351
                     50		  -1.21626
                     60		  -1.49603
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            </tableData>
          </table>
       </product>
    </function>
    <function name="aero/c/CML1">
    <description>BASE ROLLING MOMENT</description>
          <table>
            <independentVar lookup="row">aero/alpha-deg</independentVar>
            <independentVar lookup="column">aero/beta-deg</independentVar>
            <tableData>
                                -20	        -10	         -5	          0	          5	         10	         20
                    -20	  -0.03937	  -0.01828	  -0.00887	   0.00000	   0.00886	   0.01827	   0.03936
                     -4	  -0.00435	  -0.00182	  -0.00104	   0.00000	   0.00105	   0.00182	   0.00435
                      8	   0.02218	   0.01040	   0.00471	   0.00000	  -0.00471	  -0.01040	  -0.02219
                     16	   0.03879	   0.01760	   0.00803	   0.00000	  -0.00803	  -0.01760	  -0.03882
                     28	   0.05446	   0.02387	   0.01096	  -0.00002	  -0.01095	  -0.02389	  -0.05442
                     45	   0.04614	   0.01776	   0.00770	   0.00001	  -0.00760	  -0.01783	  -0.04613
                     60	   0.02366	   0.00861	   0.00513	  -0.00003	  -0.00511	  -0.00866	  -0.02358
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            </tableData>
          </table>
    </function>
    <function name="aero/c/CMLBETADOT">
    <description>ROLL MOMENT DERIVATIVE FOR BETA DOT</description>
    <product>
          <property>aero/betadot-rad_sec</property>
          <table>
            <independentVar lookup="row">aero/alpha-deg</independentVar>
            <tableData>
                    -20		   0.09630
                    -10		   0.04471
                      0		  -0.01151
                     12		  -0.06770
                     20		  -0.10447
                     30		  -0.13889
                     50		  -0.00992
                     60		  -0.01568
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            </tableData>
          </table>
       </product>
    </function>
    <function name="aero/c/CMLDRD">
    <description>ROLL MOMENT DUE TO RUDDER DEFLECTION</description>
    <product>
          <property>fcs/rudder-deg</property>
          <table>
            <independentVar lookup="row">aero/alpha-deg</independentVar>
            <independentVar lookup="column">aero/beta-deg</independentVar>
            <tableData>
                                -20	        -10	         -5	          0	          5	         10	         20
                    -20	   0.00033	   0.00041	   0.00043	   0.00044	   0.00045	   0.00044	   0.00041
                     -4	   0.00031	   0.00035	   0.00037	   0.00037	   0.00037	   0.00038	   0.00037
                      8	   0.00024	   0.00029	   0.00028	   0.00029	   0.00029	   0.00030	   0.00028
                     16	   0.00020	   0.00019	   0.00019	   0.00019	   0.00020	   0.00023	   0.00024
                     28	   0.00015	   0.00012	   0.00009	   0.00010	   0.00009	   0.00014	   0.00019
                     45	   0.00008	   0.00006	   0.00005	   0.00004	   0.00006	   0.00007	   0.00011
                     60	   0.00002	   0.00003	   0.00002	   0.00001	   0.00001	   0.00002	   0.00003
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            </tableData>
          </table>
       </product>
    </function>
    <function name="aero/c/CMLDRDMN">
    <description>ROLL MOMENT CHANGE DUE TO MACH DUE TO RUDDER DEFLECTION</description>
    <product>
          <property>fcs/rudder-deg</property>
          <table>
            <independentVar lookup="row">velocities/mach</independentVar>
            <independentVar lookup="column">aero/alpha-deg</independentVar>
            <tableData>
                                -10	         -5	         -2	       0.01	          1	          2	          6	          7	         10
                    0.2	  -0.00003	  -0.00003	  -0.00003	  -0.00003	  -0.00003	  -0.00003	  -0.00002	  -0.00002	  -0.00002
                    0.6	   0.00000	   0.00000	   0.00000	   0.00000	   0.00000	   0.00000	   0.00000	   0.00000	   0.00000
                   0.86	   0.00007	   0.00006	   0.00006	   0.00006	   0.00006	   0.00006	   0.00005	   0.00005	   0.00006
                   0.91	   0.00009	   0.00009	   0.00008	   0.00008	   0.00008	   0.00008	   0.00007	   0.00007	   0.00008
                   0.98	   0.00009	   0.00009	   0.00008	   0.00008	   0.00008	   0.00008	   0.00009	   0.00008	   0.00011
                      2	  -0.00005	  -0.00007	  -0.00007	  -0.00007	  -0.00006	  -0.00006	  -0.00005	  -0.00005	  -0.00004
                    2.4	  -0.00013	  -0.00013	  -0.00013	  -0.00012	  -0.00012	  -0.00011	  -0.00010	  -0.00010	  -0.00008
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            </tableData>
          </table>
       </product>
    </function>
    <function name="aero/c/CMLDSL">
    <description>ROLL MOMENT DUE TO SLATS</description>
    <product>
          <property>aero/beta-deg</property>
          <table>
            <independentVar lookup="row">aero/alpha-deg</independentVar>
            <independentVar lookup="column">fcs/slats-deg</independentVar>
            <tableData>
                                  0	         10	         23
                    -20	   0.00000	  -0.00003	  -0.00004
                     -4	   0.00000	   0.00000	   0.00000
                      8	   0.00000	   0.00003	   0.00002
                     16	   0.00000	   0.00006	   0.00004
                     28	   0.00000	   0.00004	   0.00004
                     45	   0.00000	  -0.00006	  -0.00004
                     60	   0.00000	  -0.00016	  -0.00005
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            </tableData>
          </table>
       </product>
    </function>
    <function name="aero/c/CMLDSPL">
    <description>ROLL MOMENT DUE TO SPOILERS LEFT</description>
          <table>
            <independentVar lookup="row">aero/alpha-deg</independentVar>
            <independentVar lookup="column">aero/beta-deg</independentVar>
            <independentVar lookup="table">fcs/spoiler-left-deg</independentVar>
              <tableData breakPoint="0">
                              -20	       -10	        -5	         0	         5	        10	        20
                    -20	   0.00000	   0.00000	   0.00000	   0.00000	   0.00000	   0.00000	   0.00000
                     -4	   0.00000	   0.00000	   0.00000	   0.00000	   0.00000	   0.00000	   0.00000
                      8	   0.00000	   0.00000	   0.00000	   0.00000	   0.00000	   0.00000	   0.00000
                     16	   0.00000	   0.00000	   0.00000	   0.00000	   0.00000	   0.00000	   0.00000
                     28	   0.00000	   0.00000	   0.00000	   0.00000	   0.00000	   0.00000	   0.00000
                     45	   0.00000	   0.00000	   0.00000	   0.00000	   0.00000	   0.00000	   0.00000
                     60	   0.00000	   0.00000	   0.00000	   0.00000	   0.00000	   0.00000	   0.00000
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              </tableData>
              <tableData breakPoint="20">
                              -20	       -10	        -5	         0	         5	        10	        20
                    -20	  -0.00846	  -0.00929	  -0.00894	  -0.00829	  -0.00755	  -0.00677	  -0.00521
                     -4	  -0.00993	  -0.00993	  -0.00953	  -0.00920	  -0.00846	  -0.00755	  -0.00577
                      8	  -0.01058	  -0.01035	  -0.01012	  -0.00976	  -0.00933	  -0.00850	  -0.00665
                     16	  -0.00925	  -0.01021	  -0.01014	  -0.00984	  -0.00919	  -0.00869	  -0.00687
                     28	  -0.00545	  -0.00759	  -0.00837	  -0.00866	  -0.00833	  -0.00782	  -0.00610
                     45	  -0.00097	  -0.00239	  -0.00358	  -0.00642	  -0.00609	  -0.00548	  -0.00468
                     60	  -0.00161	  -0.00275	  -0.00762	  -0.00774	  -0.00575	  -0.00430	  -0.00325
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              </tableData>
              <tableData breakPoint="50">
                              -20	       -10	        -5	         0	         5	        10	        20
                    -20	  -0.01318	  -0.01456	  -0.01381	  -0.01297	  -0.01191	  -0.01057	  -0.00819
                     -4	  -0.01605	  -0.01643	  -0.01567	  -0.01521	  -0.01395	  -0.01249	  -0.00947
                      8	  -0.01791	  -0.01752	  -0.01705	  -0.01653	  -0.01566	  -0.01438	  -0.01128
                     16	  -0.01664	  -0.01768	  -0.01738	  -0.01701	  -0.01596	  -0.01497	  -0.01181
                     28	  -0.01229	  -0.01462	  -0.01514	  -0.01554	  -0.01508	  -0.01388	  -0.01103
                     45	  -0.00225	  -0.00671	  -0.00876	  -0.01124	  -0.01134	  -0.00985	  -0.00861
                     60	  -0.00358	  -0.00660	  -0.00893	  -0.00799	  -0.00886	  -0.00887	  -0.00936
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              </tableData>
          </table>
    </function>
    <function name="aero/c/CMLDSPR">
    <description>ROLL MOMENT DUE TO SPOILERS RIGHT</description>
          <table>
            <independentVar lookup="row">aero/alpha-deg</independentVar>
            <independentVar lookup="column">aero/beta-deg</independentVar>
            <independentVar lookup="table">fcs/spoiler-right-deg</independentVar>
              <tableData breakPoint="0">
                              -20	       -10	        -5	         0	         5	        10	        20
                    -20	   0.00000	   0.00000	   0.00000	   0.00000	   0.00000	   0.00000	   0.00000
                     -4	   0.00000	   0.00000	   0.00000	   0.00000	   0.00000	   0.00000	   0.00000
                      8	   0.00000	   0.00000	   0.00000	   0.00000	   0.00000	   0.00000	   0.00000
                     16	   0.00000	   0.00000	   0.00000	   0.00000	   0.00000	   0.00000	   0.00000
                     28	   0.00000	   0.00000	   0.00000	   0.00000	   0.00000	   0.00000	   0.00000
                     45	   0.00000	   0.00000	   0.00000	   0.00000	   0.00000	   0.00000	   0.00000
                     60	   0.00000	   0.00000	   0.00000	   0.00000	   0.00000	   0.00000	   0.00000
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              </tableData>
              <tableData breakPoint="20">
                              -20	       -10	        -5	         0	         5	        10	        20
                    -20	   0.00846	   0.00929	   0.00894	   0.00829	   0.00755	   0.00677	   0.00521
                     -4	   0.00993	   0.00993	   0.00953	   0.00920	   0.00846	   0.00755	   0.00577
                      8	   0.01058	   0.01035	   0.01012	   0.00976	   0.00933	   0.00850	   0.00665
                     16	   0.00925	   0.01021	   0.01014	   0.00984	   0.00919	   0.00869	   0.00687
                     28	   0.00545	   0.00759	   0.00837	   0.00866	   0.00833	   0.00782	   0.00610
                     45	   0.00097	   0.00239	   0.00358	   0.00642	   0.00609	   0.00548	   0.00468
                     60	   0.00161	   0.00275	   0.00762	   0.00774	   0.00575	   0.00430	   0.00325
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              </tableData>
              <tableData breakPoint="50">
                              -20	       -10	        -5	         0	         5	        10	        20
                    -20	   0.01318	   0.01456	   0.01381	   0.01297	   0.01191	   0.01057	   0.00819
                     -4	   0.01605	   0.01643	   0.01567	   0.01521	   0.01395	   0.01249	   0.00947
                      8	   0.01791	   0.01752	   0.01705	   0.01653	   0.01566	   0.01438	   0.01128
                     16	   0.01664	   0.01768	   0.01738	   0.01701	   0.01596	   0.01497	   0.01181
                     28	   0.01229	   0.01462	   0.01514	   0.01554	   0.01508	   0.01388	   0.01103
                     45	   0.00225	   0.00671	   0.00876	   0.01124	   0.01134	   0.00985	   0.00861
                     60	   0.00358	   0.00660	   0.00893	   0.00799	   0.00886	   0.00887	   0.00936
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              </tableData>
          </table>
    </function>
    <function name="aero/c/CMLDTD">
    <description>ROLL MOMENT DUE TO DIFFERENTIAL TAIL DEFLECTION</description>
    <product>
          <property>fcs/differential-elevator-pos-norm</property>
          <table>
            <independentVar lookup="row">aero/alpha-deg</independentVar>
            <independentVar lookup="column">fcs/pitch-pos-deg</independentVar>
            <tableData>
                                -20	        -10	         -5	          0	          5	         10	         20
                    -20	   0.00106	   0.00096	   0.00083	   0.00060	   0.00028	  -0.00004	  -0.00042
                     -4	   0.00101	   0.00108	   0.00103	   0.00096	   0.00087	   0.00067	   0.00027
                      8	   0.00059	   0.00101	   0.00112	   0.00112	   0.00108	   0.00094	   0.00076
                     16	   0.00026	   0.00082	   0.00099	   0.00110	   0.00118	   0.00112	   0.00091
                     28	  -0.00015	   0.00027	   0.00055	   0.00085	   0.00110	   0.00116	   0.00111
                     45	  -0.00048	  -0.00028	  -0.00003	   0.00021	   0.00048	   0.00062	   0.00089
                     60	  -0.00020	  -0.00014	  -0.00007	   0.00000	   0.00018	   0.00019	   0.00050
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            </tableData>
          </table>
       </product>
    </function>
    <function name="aero/c/CMLGEAR">
    <description>ROLL MOMENT DUE TO GEAR</description>
    <product>
          <property>gear/gear-pos-norm</property>
          <table>
            <independentVar lookup="row">aero/alpha-deg</independentVar>
            <independentVar lookup="column">aero/beta-deg</independentVar>
            <tableData>
                                -20	        -10	         -5	          0	          5	         10	         20
                    -20	   0.00444	   0.00335	   0.00186	   0.00001	  -0.00187	  -0.00335	  -0.00444
                     -4	   0.00572	   0.00440	   0.00228	   0.00000	  -0.00227	  -0.00440	  -0.00572
                      8	   0.00594	   0.00436	   0.00226	   0.00000	  -0.00226	  -0.00435	  -0.00594
                     16	   0.00546	   0.00405	   0.00215	   0.00000	  -0.00212	  -0.00407	  -0.00548
                     28	   0.00444	   0.00326	   0.00200	  -0.00001	  -0.00200	  -0.00329	  -0.00443
                     45	   0.00328	   0.00193	   0.00101	  -0.00001	  -0.00090	  -0.00197	  -0.00326
                     60	   0.00199	   0.00109	   0.00031	  -0.00002	  -0.00025	  -0.00111	  -0.00193
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            </tableData>
          </table>
       </product>
    </function>
    <function name="aero/c/CMLMN">
    <description>ROLL MOMENT DUE TO MACH</description>
          <table>
            <independentVar lookup="row">velocities/mach</independentVar>
            <independentVar lookup="column">aero/alpha-deg</independentVar>
            <tableData>
                                -10	         -5	         -2	       0.01	          1	          2	          6	          7	         10
                    0.2	   0.00000	   0.00000	   0.00000	   0.00000	   0.00000	   0.00000	   0.00000	   0.00000	   0.00000
                    0.6	   0.00000	   0.00000	   0.00000	   0.00000	   0.00000	   0.00000	   0.00000	   0.00000	   0.00000
                   0.86	   0.00000	   0.00000	   0.00000	   0.00000	   0.00000	   0.00000	   0.00000	   0.00000	   0.00000
                   0.91	   0.00000	   0.00000	   0.00000	   0.00000	   0.00000	   0.00000	   0.00000	   0.00000	   0.00000
                   0.98	   0.00000	   0.00000	   0.00000	   0.00000	   0.00000	   0.00000	   0.00000	   0.00000	   0.00000
                      2	  -0.00106	  -0.00027	  -0.00008	  -0.00003	  -0.00001	   0.00000	   0.00001	   0.00002	   0.00011
                    2.4	  -0.00063	  -0.00017	  -0.00005	  -0.00002	  -0.00001	  -0.00001	   0.00000	   0.00000	   0.00002
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            </tableData>
          </table>
    </function>
    <function name="aero/c/CMLP">
    <description>ROLL DAMPING DERIVATIVE</description>
    <product>
          <property>aero/pb</property>
          <table>
            <independentVar lookup="row">aero/alpha-deg</independentVar>
            <tableData>
                    -20		  -0.09771
                    -10		  -0.12498
                      0		  -0.13510
                     12		  -0.13900
                     20		  -0.12300
                     30		  -0.09516
                     50		  -0.07651
                     60		  -0.08728
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            </tableData>
          </table>
       </product>
    </function>
    <function name="aero/c/CMLR">
    <description>ROLL DERIVATIVE MOMENT DUE TO YAW RATE</description>
    <product>
          <property>aero/rb</property>
          <table>
            <independentVar lookup="row">aero/alpha-deg</independentVar>
            <tableData>
                    -20		  -0.07704
                    -10		  -0.01875
                      0		   0.03233
                     12		   0.08974
                     20		   0.13730
                     30		   0.18449
                     50		   0.17811
                     60		   0.20754
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            </tableData>
          </table>
       </product>
    </function>
    <function name="aero/c/CFYB">
    <description>BASE SIDEFORCE</description>
          <table>
            <independentVar lookup="row">aero/alpha-deg</independentVar>
            <independentVar lookup="column">aero/beta-deg</independentVar>
            <independentVar lookup="table">fcs/pitch-pos-deg</independentVar>
              <tableData breakPoint="-20">
                              -20	       -10	        -5	         0	         5	        10	        20
                    -20	  -0.00771	  -0.02431	  -0.01534	   0.00008	   0.01496	   0.02453	   0.00754
                     -4	   0.10931	   0.05646	   0.02833	   0.00003	  -0.02832	  -0.05643	  -0.10927
                      8	   0.11886	   0.06236	   0.03017	  -0.00007	  -0.03017	  -0.06215	  -0.11864
                     16	   0.07277	   0.03041	   0.00975	  -0.00003	  -0.00911	  -0.03067	  -0.07244
                     28	  -0.04924	  -0.03167	  -0.02021	   0.00021	   0.02060	   0.03182	   0.04987
                     45	  -0.34884	  -0.19417	  -0.10740	   0.00266	   0.10963	   0.19379	   0.34582
                     60	  -0.61129	  -0.35083	  -0.18740	  -0.00233	   0.18475	   0.34620	   0.61178
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              </tableData>
              <tableData breakPoint="-10">
                              -20	       -10	        -5	         0	         5	        10	        20
                    -20	   0.04458	   0.01430	  -0.00257	   0.00002	   0.00288	  -0.01424	  -0.04453
                     -4	   0.16202	   0.08717	   0.04398	  -0.00001	  -0.04398	  -0.08716	  -0.16203
                      8	   0.14919	   0.07678	   0.03793	  -0.00001	  -0.03794	  -0.07676	  -0.14919
                     16	   0.08450	   0.03606	   0.01422	   0.00009	  -0.01398	  -0.03597	  -0.08505
                     28	  -0.06318	  -0.04016	  -0.02275	  -0.00016	   0.02369	   0.04174	   0.06340
                     45	  -0.38426	  -0.21855	  -0.12239	   0.00256	   0.12538	   0.21765	   0.38257
                     60	  -0.62555	  -0.37409	  -0.20714	   0.00098	   0.20333	   0.37341	   0.63252
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              </tableData>
              <tableData breakPoint="-5">
                              -20	       -10	        -5	         0	         5	        10	        20
                    -20	   0.06333	   0.02320	   0.00896	   0.00011	  -0.00887	  -0.02320	  -0.06328
                     -4	   0.17396	   0.09418	   0.04762	  -0.00001	  -0.04770	  -0.09417	  -0.17400
                      8	   0.15131	   0.07807	   0.03823	  -0.00002	  -0.03830	  -0.07806	  -0.15126
                     16	   0.07952	   0.03623	   0.01461	  -0.00004	  -0.01457	  -0.03627	  -0.07949
                     28	  -0.07795	  -0.04505	  -0.02520	  -0.00015	   0.02509	   0.04626	   0.07771
                     45	  -0.40461	  -0.23321	  -0.12846	   0.00305	   0.12897	   0.23264	   0.40321
                     60	  -0.66598	  -0.39290	  -0.21175	  -0.00263	   0.21120	   0.39121	   0.66466
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              </tableData>
              <tableData breakPoint="0">
                              -20	       -10	        -5	         0	         5	        10	        20
                    -20	   0.08438	   0.03619	   0.01587	   0.00013	  -0.01540	  -0.03557	  -0.08432
                     -4	   0.18365	   0.09750	   0.04918	   0.00002	  -0.04918	  -0.09750	  -0.18365
                      8	   0.14843	   0.07641	   0.03665	  -0.00010	  -0.03682	  -0.07639	  -0.14837
                     16	   0.07047	   0.02916	   0.01445	  -0.00003	  -0.01452	  -0.02920	  -0.07052
                     28	  -0.09748	  -0.05873	  -0.03118	  -0.00018	   0.03093	   0.05940	   0.09816
                     45	  -0.42480	  -0.25148	  -0.13917	  -0.00046	   0.13995	   0.25184	   0.42305
                     60	  -0.67343	  -0.41595	  -0.23102	  -0.00172	   0.22893	   0.41581	   0.68651
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              </tableData>
              <tableData breakPoint="5">
                              -20	       -10	        -5	         0	         5	        10	        20
                    -20	   0.09894	   0.04356	   0.01822	   0.00035	  -0.01854	  -0.04334	  -0.09887
                     -4	   0.18666	   0.09946	   0.05000	   0.00000	  -0.04999	  -0.09951	  -0.18667
                      8	   0.14228	   0.07457	   0.03681	  -0.00002	  -0.03681	  -0.07457	  -0.14231
                     16	   0.05582	   0.02001	   0.00698	   0.00006	  -0.00710	  -0.01991	  -0.05521
                     28	  -0.12073	  -0.06692	  -0.03922	   0.00006	   0.03943	   0.06729	   0.12033
                     45	  -0.43574	  -0.26234	  -0.14256	  -0.00002	   0.14710	   0.26312	   0.43441
                     60	  -0.68910	  -0.41873	  -0.23211	  -0.00414	   0.22986	   0.41599	   0.68504
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              </tableData>
              <tableData breakPoint="10">
                              -20	       -10	        -5	         0	         5	        10	        20
                    -20	   0.10869	   0.04900	   0.02272	   0.00013	  -0.02207	  -0.04902	  -0.10867
                     -4	   0.18414	   0.09803	   0.04883	  -0.00001	  -0.04880	  -0.09798	  -0.18415
                      8	   0.12681	   0.06605	   0.03341	  -0.00005	  -0.03343	  -0.06604	  -0.12678
                     16	   0.03460	   0.00917	   0.00190	   0.00006	   0.00087	  -0.00911	  -0.03444
                     28	  -0.14577	  -0.07931	  -0.04676	   0.00002	   0.04776	   0.08047	   0.14648
                     45	  -0.44307	  -0.27108	  -0.14718	  -0.00140	   0.14851	   0.27154	   0.44175
                     60	  -0.66958	  -0.41324	  -0.22990	  -0.00064	   0.22877	   0.41178	   0.67825
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              </tableData>
              <tableData breakPoint="20">
                              -20	       -10	        -5	         0	         5	        10	        20
                    -20	   0.11339	   0.05217	   0.02304	  -0.00005	  -0.02249	  -0.05196	  -0.11338
                     -4	   0.16311	   0.08604	   0.04358	  -0.00006	  -0.04350	  -0.08608	  -0.16319
                      8	   0.09047	   0.04373	   0.02261	  -0.00007	  -0.02262	  -0.04371	  -0.09037
                     16	  -0.00729	  -0.01440	  -0.01276	   0.00021	   0.01301	   0.01555	   0.00736
                     28	  -0.17518	  -0.10250	  -0.05646	   0.00056	   0.05664	   0.10289	   0.17540
                     45	  -0.45256	  -0.27297	  -0.14982	  -0.00239	   0.15103	   0.27464	   0.45296
                     60	  -0.64407	  -0.40228	  -0.21894	   0.00079	   0.21853	   0.40167	   0.64696
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              </tableData>
          </table>
    </function>
    <function name="aero/c/CFYDSPL">
    <description>SIDEFORCE DUE TO SPOILERS LEFT</description>
          <table>
            <independentVar lookup="row">aero/alpha-deg</independentVar>
            <independentVar lookup="column">aero/beta-deg</independentVar>
            <independentVar lookup="table">fcs/spoiler-left-deg</independentVar>
              <tableData breakPoint="0">
                              -20	       -10	        -5	         0	         5	        10	        20
                    -20	   0.00000	   0.00000	   0.00000	   0.00000	   0.00000	   0.00000	   0.00000
                     -4	   0.00000	   0.00000	   0.00000	   0.00000	   0.00000	   0.00000	   0.00000
                      8	   0.00000	   0.00000	   0.00000	   0.00000	   0.00000	   0.00000	   0.00000
                     16	   0.00000	   0.00000	   0.00000	   0.00000	   0.00000	   0.00000	   0.00000
                     28	   0.00000	   0.00000	   0.00000	   0.00000	   0.00000	   0.00000	   0.00000
                     45	   0.00000	   0.00000	   0.00000	   0.00000	   0.00000	   0.00000	   0.00000
                     60	   0.00000	   0.00000	   0.00000	   0.00000	   0.00000	   0.00000	   0.00000
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              </tableData>
              <tableData breakPoint="20">
                              -20	       -10	        -5	         0	         5	        10	        20
                    -20	  -0.00269	  -0.00264	  -0.00427	  -0.00687	  -0.01047	  -0.01002	  -0.01034
                     -4	  -0.00288	  -0.00560	  -0.00643	  -0.00697	  -0.00679	  -0.00648	  -0.00615
                      8	  -0.00638	  -0.00702	  -0.00593	  -0.00525	  -0.00252	  -0.00232	  -0.00100
                     16	  -0.00224	  -0.00491	  -0.00141	  -0.00137	  -0.00244	   0.00082	   0.00152
                     28	  -0.00402	  -0.00355	  -0.00150	   0.00129	   0.00096	   0.00430	   0.00984
                     45	   0.00472	   0.00372	  -0.00228	  -0.00073	   0.00330	   0.00871	   0.00918
                     60	   0.00311	   0.01265	  -0.00934	   0.00418	   0.00191	   0.00508	  -0.00436
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              </tableData>
              <tableData breakPoint="50">
                              -20	       -10	        -5	         0	         5	        10	        20
                    -20	  -0.00370	  -0.00530	  -0.00918	  -0.01383	  -0.01611	  -0.01776	  -0.01705
                     -4	  -0.00401	  -0.00971	  -0.01137	  -0.01273	  -0.01233	  -0.01232	  -0.01217
                      8	  -0.00979	  -0.01238	  -0.01048	  -0.00774	  -0.00582	  -0.00605	  -0.00311
                     16	  -0.00497	  -0.00963	  -0.00378	  -0.00394	  -0.00359	   0.00019	   0.00048
                     28	   0.00049	  -0.00676	  -0.00055	   0.00006	  -0.00167	   0.00914	   0.00901
                     45	   0.00412	   0.00294	   0.00595	   0.00460	   0.00513	   0.01091	   0.02277
                     60	   0.01328	   0.00188	  -0.00266	  -0.00331	   0.02167	   0.01729	   0.00846
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              </tableData>
          </table>
    </function>
    <function name="aero/c/CFYDSPR">
    <description>SIDEFORCE DUE TO SPOILERS RIGHT</description>
          <table>
            <independentVar lookup="row">aero/alpha-deg</independentVar>
            <independentVar lookup="column">aero/beta-deg</independentVar>
            <independentVar lookup="table">fcs/spoiler-right-deg</independentVar>
              <tableData breakPoint="0">
                              -20	       -10	        -5	         0	         5	        10	        20
                    -20	   0.00000	   0.00000	   0.00000	   0.00000	   0.00000	   0.00000	   0.00000
                     -4	   0.00000	   0.00000	   0.00000	   0.00000	   0.00000	   0.00000	   0.00000
                      8	   0.00000	   0.00000	   0.00000	   0.00000	   0.00000	   0.00000	   0.00000
                     16	   0.00000	   0.00000	   0.00000	   0.00000	   0.00000	   0.00000	   0.00000
                     28	   0.00000	   0.00000	   0.00000	   0.00000	   0.00000	   0.00000	   0.00000
                     45	   0.00000	   0.00000	   0.00000	   0.00000	   0.00000	   0.00000	   0.00000
                     60	   0.00000	   0.00000	   0.00000	   0.00000	   0.00000	   0.00000	   0.00000
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              </tableData>
              <tableData breakPoint="20">
                              -20	       -10	        -5	         0	         5	        10	        20
                    -20	   0.00269	   0.00264	   0.00427	   0.00687	   0.01047	   0.01002	   0.01034
                     -4	   0.00288	   0.00560	   0.00643	   0.00697	   0.00679	   0.00648	   0.00615
                      8	   0.00638	   0.00702	   0.00593	   0.00525	   0.00252	   0.00232	   0.00100
                     16	   0.00224	   0.00491	   0.00141	   0.00137	   0.00244	  -0.00082	  -0.00152
                     28	   0.00402	   0.00355	   0.00150	  -0.00129	  -0.00096	  -0.00430	  -0.00984
                     45	  -0.00472	  -0.00372	   0.00228	   0.00073	  -0.00330	  -0.00871	  -0.00918
                     60	  -0.00311	  -0.01265	   0.00934	  -0.00418	  -0.00191	  -0.00508	   0.00436
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              </tableData>
              <tableData breakPoint="50">
                              -20	       -10	        -5	         0	         5	        10	        20
                    -20	   0.00370	   0.00530	   0.00918	   0.01383	   0.01611	   0.01776	   0.01705
                     -4	   0.00401	   0.00971	   0.01137	   0.01273	   0.01233	   0.01232	   0.01217
                      8	   0.00979	   0.01238	   0.01048	   0.00774	   0.00582	   0.00605	   0.00311
                     16	   0.00497	   0.00963	   0.00378	   0.00394	   0.00359	  -0.00019	  -0.00048
                     28	  -0.00049	   0.00676	   0.00055	  -0.00006	   0.00167	  -0.00914	  -0.00901
                     45	  -0.00412	  -0.00294	  -0.00595	  -0.00460	  -0.00513	  -0.01091	  -0.02277
                     60	  -0.01328	  -0.00188	   0.00266	   0.00331	  -0.02167	  -0.01729	  -0.00846
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              </tableData>
          </table>
    </function>
    <function name="aero/c/CFYDTD">
    <description>SIDE FORCE DUE TO DIFFERENTIAL TAIL DEFLECTION</description>
    <product>
          <property>fcs/differential-elevator-pos-norm</property>
          <table>
            <independentVar lookup="row">aero/alpha-deg</independentVar>
            <independentVar lookup="column">fcs/pitch-pos-deg</independentVar>
            <tableData>
                                -20	        -10	         -5	          0	          5	         10	         20
                    -20	  -0.00397	  -0.00475	  -0.00494	  -0.00496	  -0.00502	  -0.00376	   0.00034
                     -4	  -0.00378	  -0.00426	  -0.00443	  -0.00448	  -0.00434	  -0.00404	  -0.00192
                      8	  -0.00357	  -0.00427	  -0.00475	  -0.00497	  -0.00471	  -0.00429	  -0.00270
                     16	  -0.00254	  -0.00414	  -0.00460	  -0.00499	  -0.00484	  -0.00435	  -0.00343
                     28	  -0.00104	  -0.00285	  -0.00403	  -0.00464	  -0.00468	  -0.00448	  -0.00390
                     45	  -0.00103	  -0.00299	  -0.00284	  -0.00390	  -0.00506	  -0.00366	  -0.00396
                     60	   0.00065	  -0.00084	  -0.00133	  -0.00501	  -0.00398	  -0.00166	  -0.00332
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            </tableData>
          </table>
       </product>
    </function>
    <function name="aero/c/CFYGEAR">
    <description>SIDEFORCE DUE TO GEAR</description>
    <product>
          <property>gear/gear-pos-norm</property>
          <property>aero/beta-deg</property>
          <table>
            <independentVar lookup="row">aero/alpha-deg</independentVar>
            <tableData>
                    -20		  -0.00410
                    -10		  -0.00457
                      0		  -0.00462
                     12		  -0.00427
                     20		  -0.00411
                     30		  -0.00278
                     50		  -0.00192
                     60		  -0.00101
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            </tableData>
          </table>
       </product>
    </function>
    <function name="aero/c/CFYMN">
    <description>SIDEFORCE DUE TO MACH</description>
          <table>
            <independentVar lookup="row">velocities/mach</independentVar>
            <independentVar lookup="column">aero/alpha-deg</independentVar>
            <tableData>
                                -10	         -5	         -2	       0.01	          1	          2	          6	          7	         10
                    0.2	   0.00003	  -0.00001	   0.00000	   0.00000	   0.00000	   0.00001	  -0.00003	   0.00000	   0.00008
                    0.6	   0.00000	   0.00000	   0.00000	   0.00000	   0.00000	   0.00000	   0.00000	   0.00000	   0.00000
                   0.86	  -0.00002	  -0.00001	   0.00000	   0.00000	   0.00000	   0.00000	  -0.00003	   0.00003	  -0.00005
                   0.91	  -0.00002	  -0.00002	   0.00000	   0.00000	   0.00000	   0.00000	  -0.00004	   0.00004	  -0.00003
                   0.98	  -0.00002	  -0.00002	   0.00000	   0.00000	   0.00000	   0.00000	  -0.00006	   0.00003	   0.00000
                      2	   0.02867	   0.00693	   0.00184	   0.00051	   0.00023	   0.00010	  -0.00047	  -0.00084	  -0.00444
                    2.4	   0.01676	   0.00440	   0.00127	   0.00038	   0.00018	   0.00008	   0.00002	   0.00005	  -0.00084
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            </tableData>
          </table>
    </function>
    <function name="aero/c/CFYP">
    <description>SIDE FORCE DERIVATIVE MOMENT DUE TO ROLL RATE</description>
    <product>
          <property>aero/pb</property>
          <table>
            <independentVar lookup="row">aero/alpha-deg</independentVar>
            <tableData>
                    -20		   0.04309
                    -10		   0.01687
                      0		   0.02312
                     12		   0.02649
                     20		   0.04722
                     30		   0.08357
                     50		   0.06099
                     60		   0.14886
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            </tableData>
          </table>
       </product>
    </function>
    <function name="aero/c/CFYR">
    <description>SIDE FORCE DERIVATIVE MOMENT DUE TO YAW RATE</description>
    <product>
          <property>aero/rb</property>
          <table>
            <independentVar lookup="row">aero/alpha-deg</independentVar>
            <tableData>
                    -20		   0.49715
                    -10		   0.47741
                      0		   0.46257
                     12		   0.36764
                     20		   0.27770
                     30		   0.10531
                     50		  -0.21827
                     60		  -0.22427
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            </tableData>
          </table>
       </product>
    </function>
    <function name="aero/c/CYDRD">
    <description>SIDE FORCE DUE TO RUDDER DEFLECTION</description>
    <product>
          <property>fcs/rudder-deg</property>
          <table>
            <independentVar lookup="row">aero/alpha-deg</independentVar>
            <independentVar lookup="column">aero/beta-deg</independentVar>
            <tableData>
                                -20	        -10	         -5	          0	          5	         10	         20
                    -20	   0.00342	   0.00398	   0.00415	   0.00429	   0.00443	   0.00437	   0.00418
                     -4	   0.00361	   0.00418	   0.00425	   0.00428	   0.00439	   0.00448	   0.00436
                      8	   0.00331	   0.00385	   0.00398	   0.00398	   0.00406	   0.00416	   0.00393
                     16	   0.00275	   0.00318	   0.00333	   0.00334	   0.00357	   0.00360	   0.00353
                     28	   0.00217	   0.00259	   0.00236	   0.00232	   0.00232	   0.00267	   0.00288
                     45	   0.00092	   0.00145	   0.00147	   0.00133	   0.00152	   0.00165	   0.00158
                     60	   0.00038	   0.00048	   0.00056	   0.00057	   0.00084	   0.00036	   0.00043
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            </tableData>
          </table>
       </product>
    </function>
    <function name="aero/c/CYDRDMN">
    <description>SIDEFORCE CHANGE DUE TO MACH DUE TO TO RUDDER DEFLECTION</description>
    <product>
          <property>fcs/rudder-deg</property>
          <table>
            <independentVar lookup="row">velocities/mach</independentVar>
            <independentVar lookup="column">aero/alpha-deg</independentVar>
            <tableData>
                                -10	         -5	         -2	       0.01	          1	          2	          6	          7	         10
                    0.2	  -0.00033	  -0.00034	  -0.00036	  -0.00038	  -0.00037	  -0.00034	  -0.00035	  -0.00031	  -0.00032
                    0.6	   0.00000	   0.00000	   0.00000	   0.00000	   0.00000	   0.00000	   0.00000	   0.00000	   0.00000
                   0.86	   0.00077	   0.00071	   0.00071	   0.00070	   0.00067	   0.00063	   0.00064	   0.00054	   0.00062
                   0.91	   0.00101	   0.00097	   0.00097	   0.00095	   0.00091	   0.00089	   0.00086	   0.00084	   0.00083
                   0.98	   0.00150	   0.00152	   0.00154	   0.00152	   0.00149	   0.00145	   0.00148	   0.00142	   0.00160
                      2	   0.00008	  -0.00099	  -0.00123	  -0.00129	  -0.00129	  -0.00130	  -0.00126	  -0.00138	  -0.00140
                    2.4	  -0.00100	  -0.00166	  -0.00183	  -0.00187	  -0.00186	  -0.00188	  -0.00180	  -0.00190	  -0.00178
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            </tableData>
          </table>
       </product>
    </function>
    <function name="aero/c/CYDSL">
    <description>SIDE FORCE DUE TO SLATS</description>
    <product>
          <property>aero/beta-deg</property>
          <table>
            <independentVar lookup="row">aero/alpha-deg</independentVar>
            <independentVar lookup="column">fcs/slats-deg</independentVar>
            <tableData>
                                  0	         10	         23
                    -20	   0.00000	  -0.00005	   0.00016
                     -4	   0.00000	  -0.00003	  -0.00004
                      8	   0.00000	   0.00003	   0.00006
                     16	   0.00000	  -0.00016	   0.00003
                     28	   0.00000	  -0.00003	   0.00000
                     45	   0.00000	  -0.00086	  -0.00059
                     60	   0.00000	   0.00398	   0.00103
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            </tableData>
          </table>
       </product>
    </function>
    <function name="aero/c/CMN1">
    <description>BASE YAWING MOMENT</description>
          <table>
            <independentVar lookup="row">aero/alpha-deg</independentVar>
            <independentVar lookup="column">aero/beta-deg</independentVar>
            <independentVar lookup="table">fcs/pitch-pos-deg</independentVar>
              <tableData breakPoint="-20">
                              -20	       -10	        -5	         0	         5	        10	        20
                    -20	   0.03261	   0.02510	   0.01351	  -0.00001	  -0.01341	  -0.02516	  -0.03252
                     -4	   0.00744	   0.00670	   0.00368	   0.00001	  -0.00368	  -0.00671	  -0.00744
                      8	  -0.00216	   0.00065	   0.00103	  -0.00001	  -0.00103	  -0.00065	   0.00209
                     16	  -0.00203	   0.00273	   0.00278	  -0.00004	  -0.00273	  -0.00278	   0.00197
                     28	  -0.00071	   0.00271	   0.00296	  -0.00015	  -0.00290	  -0.00281	   0.00056
                     45	   0.02984	   0.01958	   0.01247	   0.00028	  -0.01200	  -0.01999	  -0.02970
                     60	   0.07100	   0.04436	   0.02337	  -0.00058	  -0.02329	  -0.04367	  -0.07145
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              </tableData>
              <tableData breakPoint="-10">
                              -20	       -10	        -5	         0	         5	        10	        20
                    -20	   0.01726	   0.01316	   0.00927	   0.00002	  -0.00913	  -0.01316	  -0.01728
                     -4	  -0.00923	  -0.00333	  -0.00126	   0.00000	   0.00126	   0.00332	   0.00923
                      8	  -0.01278	  -0.00516	  -0.00218	   0.00000	   0.00217	   0.00515	   0.01277
                     16	  -0.00744	  -0.00061	   0.00127	   0.00000	  -0.00130	   0.00063	   0.00746
                     28	   0.00148	   0.00367	   0.00321	   0.00016	  -0.00326	  -0.00350	  -0.00155
                     45	   0.03970	   0.02704	   0.01756	   0.00026	  -0.01691	  -0.02768	  -0.03980
                     60	   0.07263	   0.05017	   0.02776	  -0.00099	  -0.02899	  -0.05030	  -0.07331
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              </tableData>
              <tableData breakPoint="-5">
                              -20	       -10	        -5	         0	         5	        10	        20
                    -20	   0.01188	   0.01064	   0.00597	   0.00001	  -0.00595	  -0.01062	  -0.01188
                     -4	  -0.01245	  -0.00545	  -0.00228	   0.00000	   0.00228	   0.00546	   0.01247
                      8	  -0.01398	  -0.00583	  -0.00241	   0.00000	   0.00240	   0.00583	   0.01396
                     16	  -0.00724	  -0.00090	   0.00129	  -0.00003	  -0.00132	   0.00092	   0.00721
                     28	   0.00443	   0.00475	   0.00350	  -0.00010	  -0.00359	  -0.00465	  -0.00437
                     45	   0.04496	   0.03143	   0.01856	   0.00025	  -0.01885	  -0.03176	  -0.04494
                     60	   0.07943	   0.05350	   0.03028	  -0.00045	  -0.03010	  -0.05412	  -0.07873
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              </tableData>
              <tableData breakPoint="0">
                              -20	       -10	        -5	         0	         5	        10	        20
                    -20	   0.00611	   0.00671	   0.00395	   0.00001	  -0.00388	  -0.00682	  -0.00610
                     -4	  -0.01531	  -0.00677	  -0.00290	   0.00000	   0.00289	   0.00677	   0.01531
                      8	  -0.01399	  -0.00600	  -0.00255	   0.00001	   0.00259	   0.00597	   0.01396
                     16	  -0.00539	   0.00044	   0.00112	  -0.00004	  -0.00111	  -0.00046	   0.00557
                     28	   0.00989	   0.00822	   0.00530	   0.00010	  -0.00536	  -0.00813	  -0.00982
                     45	   0.05067	   0.03765	   0.02210	  -0.00018	  -0.02207	  -0.03777	  -0.05052
                     60	   0.08669	   0.06084	   0.03537	  -0.00036	  -0.03538	  -0.06097	  -0.08738
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              </tableData>
              <tableData breakPoint="5">
                              -20	       -10	        -5	         0	         5	        10	        20
                    -20	   0.00244	   0.00478	   0.00313	  -0.00004	  -0.00330	  -0.00480	  -0.00244
                     -4	  -0.01627	  -0.00717	  -0.00316	   0.00000	   0.00316	   0.00718	   0.01627
                      8	  -0.01254	  -0.00524	  -0.00240	  -0.00001	   0.00241	   0.00524	   0.01253
                     16	  -0.00224	   0.00217	   0.00260	   0.00000	  -0.00258	  -0.00216	   0.00218
                     28	   0.01646	   0.01077	   0.00742	   0.00010	  -0.00740	  -0.01072	  -0.01640
                     45	   0.05277	   0.04049	   0.02356	  -0.00049	  -0.02355	  -0.04067	  -0.05280
                     60	   0.08461	   0.06026	   0.03455	  -0.00011	  -0.03449	  -0.06029	  -0.08438
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              </tableData>
              <tableData breakPoint="10">
                              -20	       -10	        -5	         0	         5	        10	        20
                    -20	   0.00013	   0.00309	   0.00208	   0.00002	  -0.00196	  -0.00309	  -0.00010
                     -4	  -0.01565	  -0.00674	  -0.00276	   0.00000	   0.00276	   0.00672	   0.01564
                      8	  -0.00866	  -0.00276	  -0.00086	   0.00000	   0.00087	   0.00276	   0.00863
                     16	   0.00392	   0.00547	   0.00388	   0.00002	  -0.00407	  -0.00549	  -0.00395
                     28	   0.02349	   0.01471	   0.01020	   0.00000	  -0.01017	  -0.01465	  -0.02343
                     45	   0.05351	   0.04254	   0.02415	  -0.00026	  -0.02390	  -0.04265	  -0.05359
                     60	   0.07739	   0.05596	   0.03312	   0.00047	  -0.03421	  -0.05701	  -0.07840
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              </tableData>
              <tableData breakPoint="20">
                              -20	       -10	        -5	         0	         5	        10	        20
                    -20	  -0.00057	   0.00264	   0.00215	  -0.00007	  -0.00208	  -0.00263	   0.00053
                     -4	  -0.01042	  -0.00392	  -0.00167	   0.00000	   0.00166	   0.00393	   0.01050
                      8	   0.00011	   0.00300	   0.00199	   0.00000	  -0.00198	  -0.00301	  -0.00018
                     16	   0.01407	   0.01317	   0.00815	  -0.00004	  -0.00818	  -0.01323	  -0.01399
                     28	   0.02976	   0.02062	   0.01290	  -0.00014	  -0.01302	  -0.02055	  -0.02967
                     45	   0.05200	   0.04176	   0.02413	   0.00037	  -0.02403	  -0.04174	  -0.05219
                     60	   0.06276	   0.04691	   0.02824	   0.00060	  -0.02948	  -0.04805	  -0.06296
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              </tableData>
          </table>
    </function>
    <function name="aero/c/CMNBETADOT">
    <description>YAW DERIVATIVE MOMENT DUE TO BETADOT</description>
    <product>
          <property>aero/betadot-rad_sec</property>
          <table>
            <independentVar lookup="row">aero/alpha-deg</independentVar>
            <tableData>
                    -20		  -0.05654
                    -10		   0.00558
                      0		   0.03409
                     12		  -0.00880
                     20		  -0.03093
                     30		  -0.22990
                     50		  -0.38533
                     60		  -0.34031
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            </tableData>
          </table>
       </product>
    </function>
    <function name="aero/c/CMNDRD">
    <description>YAWING MOMENT DUE TO RUDDER DEFLECTION</description>
    <product>
          <property>fcs/rudder-deg</property>
          <table>
            <independentVar lookup="row">aero/alpha-deg</independentVar>
            <independentVar lookup="column">aero/beta-deg</independentVar>
            <tableData>
                                -20	        -10	         -5	          0	          5	         10	         20
                    -20	  -0.00129	  -0.00152	  -0.00159	  -0.00165	  -0.00168	  -0.00166	  -0.00154
                     -4	  -0.00135	  -0.00157	  -0.00162	  -0.00164	  -0.00166	  -0.00168	  -0.00159
                      8	  -0.00123	  -0.00145	  -0.00151	  -0.00151	  -0.00156	  -0.00156	  -0.00144
                     16	  -0.00103	  -0.00121	  -0.00123	  -0.00128	  -0.00132	  -0.00133	  -0.00129
                     28	  -0.00084	  -0.00096	  -0.00088	  -0.00090	  -0.00093	  -0.00105	  -0.00108
                     45	  -0.00039	  -0.00053	  -0.00057	  -0.00055	  -0.00058	  -0.00063	  -0.00065
                     60	  -0.00012	  -0.00019	  -0.00021	  -0.00021	  -0.00028	  -0.00021	  -0.00016
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            </tableData>
          </table>
       </product>
    </function>
    <function name="aero/c/CMNDRDMN">
    <description>YAWING MOMENT CHANGE DUE TO MACH DUE TO RUDDER DEFLECTION</description>
    <product>
          <property>fcs/rudder-deg</property>
          <table>
            <independentVar lookup="row">velocities/mach</independentVar>
            <independentVar lookup="column">aero/alpha-deg</independentVar>
            <tableData>
                                -10	         -5	         -2	       0.01	          1	          2	          6	          7	         10
                    0.2	   0.00014	   0.00015	   0.00015	   0.00015	   0.00014	   0.00014	   0.00011	   0.00016	   0.00016
                    0.6	   0.00000	   0.00000	   0.00000	   0.00000	   0.00000	   0.00000	   0.00000	   0.00000	   0.00000
                   0.86	  -0.00032	  -0.00031	  -0.00030	  -0.00028	  -0.00027	  -0.00026	  -0.00025	  -0.00025	  -0.00030
                   0.91	  -0.00043	  -0.00042	  -0.00042	  -0.00038	  -0.00037	  -0.00036	  -0.00033	  -0.00035	  -0.00044
                   0.98	  -0.00065	  -0.00066	  -0.00067	  -0.00060	  -0.00059	  -0.00063	  -0.00062	  -0.00060	  -0.00074
                      2	   0.00014	   0.00036	   0.00038	   0.00038	   0.00038	   0.00038	   0.00042	   0.00043	   0.00042
                    2.4	   0.00057	   0.00064	   0.00063	   0.00062	   0.00062	   0.00062	   0.00066	   0.00065	   0.00061
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            </tableData>
          </table>
       </product>
    </function>
    <function name="aero/c/CMNDSPL">
    <description>YAWING MOMENT DUE TO SPOILERS LEFT</description>
          <table>
            <independentVar lookup="row">aero/alpha-deg</independentVar>
            <independentVar lookup="column">aero/beta-deg</independentVar>
            <independentVar lookup="table">fcs/spoiler-left-deg</independentVar>
              <tableData breakPoint="0">
                              -20	       -10	        -5	         0	         5	        10	        20
                    -20	   0.00000	   0.00000	   0.00000	   0.00000	   0.00000	   0.00000	   0.00000
                     -4	   0.00000	   0.00000	   0.00000	   0.00000	   0.00000	   0.00000	   0.00000
                      8	   0.00000	   0.00000	   0.00000	   0.00000	   0.00000	   0.00000	   0.00000
                     16	   0.00000	   0.00000	   0.00000	   0.00000	   0.00000	   0.00000	   0.00000
                     28	   0.00000	   0.00000	   0.00000	   0.00000	   0.00000	   0.00000	   0.00000
                     45	   0.00000	   0.00000	   0.00000	   0.00000	   0.00000	   0.00000	   0.00000
                     60	   0.00000	   0.00000	   0.00000	   0.00000	   0.00000	   0.00000	   0.00000
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              </tableData>
              <tableData breakPoint="20">
                              -20	       -10	        -5	         0	         5	        10	        20
                    -20	  -0.00013	   0.00137	   0.00103	   0.00034	  -0.00043	  -0.00048	  -0.00106
                     -4	   0.00005	  -0.00073	  -0.00089	  -0.00109	  -0.00113	  -0.00128	  -0.00115
                      8	  -0.00118	  -0.00196	  -0.00136	  -0.00155	  -0.00072	  -0.00166	  -0.00099
                     16	  -0.00077	  -0.00238	  -0.00140	  -0.00175	  -0.00157	  -0.00167	  -0.00122
                     28	  -0.00049	  -0.00199	  -0.00154	  -0.00207	  -0.00228	  -0.00153	  -0.00074
                     45	   0.00143	   0.00137	   0.00029	  -0.00188	  -0.00086	  -0.00046	  -0.00054
                     60	   0.00120	   0.00185	  -0.00086	   0.00071	   0.00008	  -0.00014	  -0.00158
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              </tableData>
              <tableData breakPoint="50">
                              -20	       -10	        -5	         0	         5	        10	        20
                    -20	  -0.00059	   0.00159	   0.00087	  -0.00011	  -0.00088	  -0.00138	  -0.00172
                     -4	   0.00012	  -0.00150	  -0.00188	  -0.00226	  -0.00229	  -0.00260	  -0.00243
                      8	  -0.00224	  -0.00372	  -0.00354	  -0.00323	  -0.00316	  -0.00328	  -0.00211
                     16	  -0.00137	  -0.00417	  -0.00310	  -0.00350	  -0.00350	  -0.00316	  -0.00277
                     28	   0.00054	  -0.00419	  -0.00309	  -0.00432	  -0.00458	  -0.00311	  -0.00219
                     45	   0.00176	   0.00132	  -0.00002	  -0.00323	  -0.00298	  -0.00332	  -0.00046
                     60	   0.00366	  -0.00075	  -0.00190	  -0.00207	   0.00129	  -0.00009	  -0.00198
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              </tableData>
          </table>
    </function>
    <function name="aero/c/CMNDSPR">
    <description>YAWING MOMENT DUE TO SPOILERS RIGHT</description>
          <table>
            <independentVar lookup="row">aero/alpha-deg</independentVar>
            <independentVar lookup="column">aero/beta-deg</independentVar>
            <independentVar lookup="table">fcs/spoiler-right-deg</independentVar>
              <tableData breakPoint="0">
                              -20	       -10	        -5	         0	         5	        10	        20
                    -20	   0.00000	   0.00000	   0.00000	   0.00000	   0.00000	   0.00000	   0.00000
                     -4	   0.00000	   0.00000	   0.00000	   0.00000	   0.00000	   0.00000	   0.00000
                      8	   0.00000	   0.00000	   0.00000	   0.00000	   0.00000	   0.00000	   0.00000
                     16	   0.00000	   0.00000	   0.00000	   0.00000	   0.00000	   0.00000	   0.00000
                     28	   0.00000	   0.00000	   0.00000	   0.00000	   0.00000	   0.00000	   0.00000
                     45	   0.00000	   0.00000	   0.00000	   0.00000	   0.00000	   0.00000	   0.00000
                     60	   0.00000	   0.00000	   0.00000	   0.00000	   0.00000	   0.00000	   0.00000
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              </tableData>
              <tableData breakPoint="20">
                              -20	       -10	        -5	         0	         5	        10	        20
                    -20	   0.00013	  -0.00137	  -0.00103	  -0.00034	   0.00043	   0.00048	   0.00106
                     -4	  -0.00005	   0.00073	   0.00089	   0.00109	   0.00113	   0.00128	   0.00115
                      8	   0.00118	   0.00196	   0.00136	   0.00155	   0.00072	   0.00166	   0.00099
                     16	   0.00077	   0.00238	   0.00140	   0.00175	   0.00157	   0.00167	   0.00122
                     28	   0.00049	   0.00199	   0.00154	   0.00207	   0.00228	   0.00153	   0.00074
                     45	  -0.00143	  -0.00137	  -0.00029	   0.00188	   0.00086	   0.00046	   0.00054
                     60	  -0.00120	  -0.00185	   0.00086	  -0.00071	  -0.00008	   0.00014	   0.00158
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              </tableData>
              <tableData breakPoint="50">
                              -20	       -10	        -5	         0	         5	        10	        20
                    -20	   0.00059	  -0.00159	  -0.00087	   0.00011	   0.00088	   0.00138	   0.00172
                     -4	  -0.00012	   0.00150	   0.00188	   0.00226	   0.00229	   0.00260	   0.00243
                      8	   0.00224	   0.00372	   0.00354	   0.00323	   0.00316	   0.00328	   0.00211
                     16	   0.00137	   0.00417	   0.00310	   0.00350	   0.00350	   0.00316	   0.00277
                     28	  -0.00054	   0.00419	   0.00309	   0.00432	   0.00458	   0.00311	   0.00219
                     45	  -0.00176	  -0.00132	   0.00002	   0.00323	   0.00298	   0.00332	   0.00046
                     60	  -0.00366	   0.00075	   0.00190	   0.00207	  -0.00129	   0.00009	   0.00198
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              </tableData>
          </table>
    </function>
    <function name="aero/c/CMNDTD">
    <description>YAWING MOMENT DUE TO DIFFERENTIAL TAIL DEFLECTION</description>
    <product>
          <property>fcs/differential-elevator-pos-norm</property>
          <table>
            <independentVar lookup="row">aero/alpha-deg</independentVar>
            <independentVar lookup="column">fcs/pitch-pos-deg</independentVar>
            <tableData>
                                -20	        -10	         -5	          0	          5	         10	         20
                    -20	   0.00098	   0.00137	   0.00163	   0.00176	   0.00187	   0.00137	   0.00017
                     -4	   0.00120	   0.00132	   0.00144	   0.00161	   0.00161	   0.00144	   0.00072
                      8	   0.00093	   0.00131	   0.00143	   0.00162	   0.00169	   0.00165	   0.00096
                     16	   0.00084	   0.00145	   0.00161	   0.00172	   0.00169	   0.00169	   0.00150
                     28	  -0.00003	   0.00094	   0.00138	   0.00171	   0.00188	   0.00189	   0.00164
                     45	  -0.00035	   0.00036	   0.00045	   0.00139	   0.00173	   0.00145	   0.00186
                     60	  -0.00125	  -0.00083	  -0.00057	   0.00073	   0.00083	   0.00036	   0.00141
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            </tableData>
          </table>
       </product>
    </function>
    <function name="aero/c/CMNGEAR">
    <description>YAWING MOMENT DUE TO GEAR</description>
    <product>
          <property>gear/gear-pos-norm</property>
          <table>
            <independentVar lookup="row">aero/alpha-deg</independentVar>
            <independentVar lookup="column">aero/beta-deg</independentVar>
            <tableData>
                                -20	        -10	         -5	          0	          5	         10	         20
                    -20	  -0.00776	  -0.00693	  -0.00361	  -0.00002	   0.00358	   0.00681	   0.00779
                     -4	  -0.00771	  -0.00694	  -0.00361	  -0.00001	   0.00360	   0.00693	   0.00771
                      8	  -0.00752	  -0.00648	  -0.00327	   0.00000	   0.00328	   0.00648	   0.00752
                     16	  -0.00722	  -0.00590	  -0.00305	   0.00001	   0.00313	   0.00595	   0.00728
                     28	  -0.00695	  -0.00539	  -0.00261	   0.00010	   0.00270	   0.00541	   0.00708
                     45	  -0.00589	  -0.00295	  -0.00178	  -0.00005	   0.00167	   0.00313	   0.00590
                     60	  -0.00403	  -0.00203	  -0.00164	   0.00021	   0.00162	   0.00226	   0.00324
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            </tableData>
          </table>
       </product>
    </function>
    <function name="aero/c/CMNMN">
    <description>YAWING MOMENT DUE TO MACH</description>
          <table>
            <independentVar lookup="row">velocities/mach</independentVar>
            <independentVar lookup="column">aero/alpha-deg</independentVar>
            <tableData>
                                -10	         -5	         -2	       0.01	          1	          2	          6	          7	         10
                    0.2	  -0.00001	   0.00000	   0.00000	   0.00000	   0.00000	   0.00000	   0.00000	   0.00000	   0.00003
                    0.6	   0.00001	   0.00000	   0.00000	   0.00000	   0.00000	   0.00000	   0.00000	   0.00000	   0.00000
                   0.86	   0.00001	   0.00000	   0.00000	   0.00000	   0.00000	   0.00000	  -0.00001	   0.00000	   0.00000
                   0.91	   0.00001	   0.00000	   0.00000	   0.00000	   0.00000	   0.00000	  -0.00001	   0.00000	   0.00000
                   0.98	   0.00001	   0.00000	   0.00000	   0.00000	   0.00000	   0.00000	  -0.00001	   0.00000	   0.00000
                      2	   0.00579	   0.00141	   0.00037	   0.00011	   0.00005	   0.00002	  -0.00004	  -0.00009	  -0.00062
                    2.4	   0.00127	   0.00031	   0.00009	   0.00003	   0.00002	   0.00001	   0.00002	   0.00004	   0.00009
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            </tableData>
          </table>
    </function>
    <function name="aero/c/CMNP">
    <description>YAW DERIVATIVE MOMENT DUE TO ROLL RATE</description>
    <product>
          <property>aero/pb</property>
          <table>
            <independentVar lookup="row">aero/alpha-deg</independentVar>
            <tableData>
                    -20		   0.06876
                    -10		   0.04738
                      0		   0.00455
                     12		  -0.04678
                     20		  -0.07243
                     30		  -0.10179
                     50		  -0.06621
                     60		  -0.05178
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            </tableData>
          </table>
       </product>
    </function>
    <function name="aero/c/CMNR">
    <description>YAW DAMPING DERIVATIVE</description>
    <product>
          <property>aero/rb</property>
          <table>
            <independentVar lookup="row">aero/alpha-deg</independentVar>
            <tableData>
                    -20		  -0.12125
                    -10		  -0.14656
                      0		  -0.16320
                     12		  -0.14373
                     20		  -0.10957
                     30		  -0.03317
                     50		   0.15517
                     60		   0.20530
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            </tableData>
          </table>
       </product>
    </function>
  <axis name="LIFT">
    <function name="aero/coefficients/CLIFT">
      <sum>
          <property>aero/c/CFZB</property>
          <property>aero/c/CFZBRK</property>
          <property>aero/c/CFZDGE</property>
          <property>aero/c/CFZDRD</property>
          <property>aero/c/CFZDRDMN</property>
          <property>aero/c/CFZDSL</property>
          <property>aero/c/CFZDSPL</property>
          <property>aero/c/CFZDSPR</property>
          <property>aero/c/CFZFLAPS</property>
          <property>aero/c/CFZFLAPSOB</property>
          <property>aero/c/CFZGEAR</property>
          <property>aero/c/CFZMN</property>
       </sum>
    </function>
    <function name="aero/force/LIFT">
    <product>
          <property>aero/qbar-psf</property>
          <property>metrics/Sw-sqft</property>
          <property>aero/coefficients/CLIFT</property>
       </product>
    </function>
  </axis>
  <axis name="DRAG">
    <function name="aero/coefficients/CDRAG">
      <sum>
          <property>aero/c/CFXB</property>
          <property>aero/c/CFXBRK</property>
          <property>aero/c/CFXDGE</property>
          <property>aero/c/CFXDRD</property>
          <property>aero/c/CFXDRDMN</property>
          <property>aero/c/CFXDSL</property>
          <property>aero/c/CFXDSPL</property>
          <property>aero/c/CFXDSPR</property>
          <property>aero/c/CFXFLAPS</property>
          <property>aero/c/CFXFLAPSOB</property>
          <property>aero/c/CFXGEAR</property>
          <property>aero/c/CFXMN</property>
       </sum>
    </function>
    <function name="aero/force/DRAG">
    <product>
          <property>aero/qbar-psf</property>
          <property>metrics/Sw-sqft</property>
          <property>aero/coefficients/CDRAG</property>
       </product>
    </function>
  </axis>
  <axis name="SIDE">
    <function name="aero/coefficients/CSIDE">
      <sum>
          <property>aero/c/CFYB</property>
          <property>aero/c/CFYDSPL</property>
          <property>aero/c/CFYDSPR</property>
          <property>aero/c/CFYDTD</property>
          <property>aero/c/CFYGEAR</property>
          <property>aero/c/CFYMN</property>
          <property>aero/c/CFYP</property>
          <property>aero/c/CFYR</property>
          <property>aero/c/CYDRD</property>
          <property>aero/c/CYDRDMN</property>
          <property>aero/c/CYDSL</property>
       </sum>
    </function>
    <function name="aero/force/SIDE">
    <product>
          <property>aero/qbar-psf</property>
          <property>metrics/Sw-sqft</property>
          <property>aero/coefficients/CSIDE</property>
       </product>
    </function>
  </axis>
  <axis name="PITCH">
    <function name="aero/coefficients/CPITCH">
      <sum>
          <property>aero/c/CMM1</property>
          <property>aero/c/CMMALPHADOT</property>
          <property>aero/c/CMMBRK</property>
          <property>aero/c/CMMDGE</property>
          <property>aero/c/CMMDRD</property>
          <property>aero/c/CMMDRDMN</property>
          <property>aero/c/CMMDSL</property>
          <property>aero/c/CMMDSPL</property>
          <property>aero/c/CMMDSPR</property>
          <property>aero/c/CMMFLAPS</property>
          <property>aero/c/CMMFLAPSOB</property>
          <property>aero/c/CMMGEAR</property>
          <property>aero/c/CMMMN</property>
          <property>aero/c/CMMQ</property>
       </sum>
    </function>
    <function name="aero/force/PITCH">
    <product>
          <property>aero/qbar-psf</property>
          <property>metrics/Sw-sqft</property>
          <property>metrics/cbarw-ft</property>
          <property>aero/coefficients/CPITCH</property>
       </product>
    </function>
  </axis>
  <axis name="ROLL">
    <function name="aero/coefficients/CROLL">
      <sum>
          <property>aero/c/CML1</property>
          <property>aero/c/CMLBETADOT</property>
          <property>aero/c/CMLDRD</property>
          <property>aero/c/CMLDRDMN</property>
          <property>aero/c/CMLDSL</property>
          <property>aero/c/CMLDSPL</property>
          <property>aero/c/CMLDSPR</property>
          <property>aero/c/CMLDTD</property>
          <property>aero/c/CMLGEAR</property>
          <property>aero/c/CMLMN</property>
          <property>aero/c/CMLP</property>
          <property>aero/c/CMLR</property>
       </sum>
    </function>
    <function name="aero/force/ROLL">
    <product>
          <property>aero/qbar-psf</property>
          <property>metrics/Sw-sqft</property>
          <property>metrics/bw-ft</property>
          <property>aero/coefficients/CROLL</property>
       </product>
    </function>
  </axis>
  <axis name="YAW">
    <function name="aero/coefficients/CYAW">
      <sum>
          <property>aero/c/CMN1</property>
          <property>aero/c/CMNBETADOT</property>
          <property>aero/c/CMNDRD</property>
          <property>aero/c/CMNDRDMN</property>
          <property>aero/c/CMNDSPL</property>
          <property>aero/c/CMNDSPR</property>
          <property>aero/c/CMNDTD</property>
          <property>aero/c/CMNGEAR</property>
          <property>aero/c/CMNMN</property>
          <property>aero/c/CMNP</property>
          <property>aero/c/CMNR</property>
       </sum>
    </function>
    <function name="aero/force/YAW">
    <product>
          <property>aero/qbar-psf</property>
          <property>metrics/Sw-sqft</property>
          <property>metrics/bw-ft</property>
          <property>aero/coefficients/CYAW</property>
       </product>
    </function>
  </axis>
</aerodynamics>
    <output name="c:/temp/JSBOut.csv" type="CSV" rate="10">
        <property caption="alpha-deg">aero/alpha-deg</property>
        <property caption="alphadot-rad_sec">aero/alphadot-rad_sec</property>
        <property caption="beta-deg">aero/beta-deg</property>
        <property caption="betadot-rad_sec">aero/betadot-rad_sec</property>
        <property caption="CFXB">aero/c/CFXB</property>
        <property caption="CFXBRK">aero/c/CFXBRK</property>
        <property caption="CFXDGE">aero/c/CFXDGE</property>
        <property caption="CFXDRD">aero/c/CFXDRD</property>
        <property caption="CFXDRDMN">aero/c/CFXDRDMN</property>
        <property caption="CFXDSL">aero/c/CFXDSL</property>
        <property caption="CFXDSPL">aero/c/CFXDSPL</property>
        <property caption="CFXDSPR">aero/c/CFXDSPR</property>
        <property caption="CFXFLAPS">aero/c/CFXFLAPS</property>
        <property caption="CFXFLAPSOB">aero/c/CFXFLAPSOB</property>
        <property caption="CFXGEAR">aero/c/CFXGEAR</property>
        <property caption="CFXMN">aero/c/CFXMN</property>
        <property caption="CFYB">aero/c/CFYB</property>
        <property caption="CFYDSPL">aero/c/CFYDSPL</property>
        <property caption="CFYDSPR">aero/c/CFYDSPR</property>
        <property caption="CFYDTD">aero/c/CFYDTD</property>
        <property caption="CFYGEAR">aero/c/CFYGEAR</property>
        <property caption="CFYMN">aero/c/CFYMN</property>
        <property caption="CFYP">aero/c/CFYP</property>
        <property caption="CFYR">aero/c/CFYR</property>
        <property caption="CFZB">aero/c/CFZB</property>
        <property caption="CFZBRK">aero/c/CFZBRK</property>
        <property caption="CFZDGE">aero/c/CFZDGE</property>
        <property caption="CFZDRD">aero/c/CFZDRD</property>
        <property caption="CFZDRDMN">aero/c/CFZDRDMN</property>
        <property caption="CFZDSL">aero/c/CFZDSL</property>
        <property caption="CFZDSPL">aero/c/CFZDSPL</property>
        <property caption="CFZDSPR">aero/c/CFZDSPR</property>
        <property caption="CFZFLAPS">aero/c/CFZFLAPS</property>
        <property caption="CFZFLAPSOB">aero/c/CFZFLAPSOB</property>
        <property caption="CFZGEAR">aero/c/CFZGEAR</property>
        <property caption="CFZMN">aero/c/CFZMN</property>
        <property caption="CML1">aero/c/CML1</property>
        <property caption="CMLBETADOT">aero/c/CMLBETADOT</property>
        <property caption="CMLDRD">aero/c/CMLDRD</property>
        <property caption="CMLDRDMN">aero/c/CMLDRDMN</property>
        <property caption="CMLDSL">aero/c/CMLDSL</property>
        <property caption="CMLDSPL">aero/c/CMLDSPL</property>
        <property caption="CMLDSPR">aero/c/CMLDSPR</property>
        <property caption="CMLDTD">aero/c/CMLDTD</property>
        <property caption="CMLGEAR">aero/c/CMLGEAR</property>
        <property caption="CMLMN">aero/c/CMLMN</property>
        <property caption="CMLP">aero/c/CMLP</property>
        <property caption="CMLR">aero/c/CMLR</property>
        <property caption="CMM1">aero/c/CMM1</property>
        <property caption="CMMALPHADOT">aero/c/CMMALPHADOT</property>
        <property caption="CMMBRK">aero/c/CMMBRK</property>
        <property caption="CMMDGE">aero/c/CMMDGE</property>
        <property caption="CMMDRD">aero/c/CMMDRD</property>
        <property caption="CMMDRDMN">aero/c/CMMDRDMN</property>
        <property caption="CMMDSL">aero/c/CMMDSL</property>
        <property caption="CMMDSPL">aero/c/CMMDSPL</property>
        <property caption="CMMDSPR">aero/c/CMMDSPR</property>
        <property caption="CMMFLAPS">aero/c/CMMFLAPS</property>
        <property caption="CMMFLAPSOB">aero/c/CMMFLAPSOB</property>
        <property caption="CMMGEAR">aero/c/CMMGEAR</property>
        <property caption="CMMMN">aero/c/CMMMN</property>
        <property caption="CMMQ">aero/c/CMMQ</property>
        <property caption="CMN1">aero/c/CMN1</property>
        <property caption="CMNBETADOT">aero/c/CMNBETADOT</property>
        <property caption="CMNDRD">aero/c/CMNDRD</property>
        <property caption="CMNDRDMN">aero/c/CMNDRDMN</property>
        <property caption="CMNDSPL">aero/c/CMNDSPL</property>
        <property caption="CMNDSPR">aero/c/CMNDSPR</property>
        <property caption="CMNDTD">aero/c/CMNDTD</property>
        <property caption="CMNGEAR">aero/c/CMNGEAR</property>
        <property caption="CMNMN">aero/c/CMNMN</property>
        <property caption="CMNP">aero/c/CMNP</property>
        <property caption="CMNR">aero/c/CMNR</property>
        <property caption="CYDRD">aero/c/CYDRD</property>
        <property caption="CYDRDMN">aero/c/CYDRDMN</property>
        <property caption="CYDSL">aero/c/CYDSL</property>
        <property caption="CDRAG">aero/coefficients/CDRAG</property>
        <property caption="CLIFT">aero/coefficients/CLIFT</property>
        <property caption="CPITCH">aero/coefficients/CPITCH</property>
        <property caption="CROLL">aero/coefficients/CROLL</property>
        <property caption="CSIDE">aero/coefficients/CSIDE</property>
        <property caption="CYAW">aero/coefficients/CYAW</property>
        <property caption="pb">aero/pb</property>
        <property caption="qb">aero/qb</property>
        <property caption="qbar-psf">aero/qbar-psf</property>
        <property caption="rb">aero/rb</property>
        <property caption="phi-deg">attitude/phi-deg</property>
        <property caption="psi-deg">attitude/psi-deg</property>
        <property caption="theta-deg">attitude/theta-deg</property>
        <property caption="differential-elevator-pos-norm">fcs/differential-elevator-pos-norm</property>
        <property caption="flap-ob-pos-deg">fcs/flap-ob-pos-deg</property>
        <property caption="flap-pos-deg">fcs/flap-pos-deg</property>
        <property caption="pitch-pos-deg">fcs/pitch-pos-deg</property>
        <property caption="rudder-deg">fcs/rudder-deg</property>
        <property caption="slats-deg">fcs/slats-deg</property>
        <property caption="speedbrake-pos-deg">fcs/speedbrake-pos-deg</property>
        <property caption="spoiler-left-deg">fcs/spoiler-left-deg</property>
        <property caption="spoiler-right-deg">fcs/spoiler-right-deg</property>
        <property caption="fbx-total-lbs">forces/fbx-total-lbs</property>
        <property caption="fby-total-lbs">forces/fby-total-lbs</property>
        <property caption="fbz-total-lbs">forces/fbz-total-lbs</property>
        <property caption="gear-pos-norm">gear/gear-pos-norm</property>
        <property caption="l-total-lbsft">moments/l-total-lbsft</property>
        <property caption="m-total-lbsft">moments/m-total-lbsft</property>
        <property caption="n-total-lbsft">moments/n-total-lbsft</property>
        <property caption="h-agl-m">position/h-agl-m</property>
        <property caption="mach">velocities/mach</property>
        <property caption="p-aero-rad_sec">velocities/p-aero-rad_sec</property>
        <property caption="q-aero-rad_sec">velocities/q-aero-rad_sec</property>
        <property caption="r-aero-rad_sec">velocities/r-aero-rad_sec</property>
        <property caption="vt-fps">velocities/vt-fps</property>
    </output>
</fdm_config>
